Внутренняя_задача_Дирихле_для_ур_Лапласа
x1(t) := t
t11 := 0
y1(t) := 0
t12 := -1
x2(t) := t
t21 := -1
y2(t) := -t - 1
t22 := -0.382
x3(t) := t
t31 := -0.382
y3(t) := -sqrt(-t)
t32 := 0
de := -0.03
ORIGIN := 1
M := 20
i := 1 .. M
t(i) := (i - 1)*(-1/M)
t2(i) := -1 + (i - 1)*(1 - 0.382)/M
t3(i) := -0.382 + (i - 1)*0.382/M
mS1x[i] := x1(t(i))
mS1y[i] := y1(t(i))
mS2x[i] := x2(t2(i))
mS2y[i] := y2(t2(i))
mS3x[i] := x3(t3(i))
mS3y[i] := y3(t3(i))
xd := 0.04
yd := 0.03
Bx[i] := xd + 1.1*mS1x[i]
Bx[i + M] := xd + 1.1*mS2x[i]
Bx[i + 2*M] := xd + 1.1*mS3x[i]
By[i] := yd + 1.1*mS1y[i]
By[i + M] := yd + 1.1*mS2y[i]
By[i + 2*M] := yd + 1.1*mS3y[i]
N := 3*M
m := 1 .. N
# [plot: mS1y[m], mS2y[m], mS3y[m], By vs mS1x[m], mS2x[m], mS3x[m], Bx]
α(x, y, m) := ln((x - Bx[m])^2 + (y - By[m])^2)
Определяем_систему_базисных_точек
i := 1 .. N
j := 1 .. N
g1[i, j] := integral(α(x1(t), y1(t), i)*α(x1(t), y1(t), j), t = t11 .. t12)
g2[i, j] := integral(α(x2(t), y2(t), i)*α(x2(t), y2(t), j), t = t21 .. t22)
g3[i, j] := integral(α(x3(t), y3(t), i)*α(x3(t), y3(t), j), t = t31 .. t32)
κ := 0.3
C1 := -κ
C2 := κ
g[i, j] := g1[i, j] + g2[i, j] + g3[i, j]
b1[i] := integral(C1*α(x1(t), y1(t), i), t = t11 .. t12)
b2[i] := integral(0*α(x2(t), y2(t), i), t = t21 .. t22)
b3[i] := integral(C2*α(x3(t), y3(t), i), t = t31 .. t32)
b[i] := b1[i] + b2[i] + b3[i]
c := lsolve(g, b)
transpose(c) = [
    0.920679, -0.466998, 0.0864502, 0.0375707, -0.0496062, 0.0608835, -0.0211558, 0.0124264, -0.00689285, -0.00557918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]
u(x, y) :=
    if (y ≥ -1 - x) and (y ≥ -sqrt(-x)) and (x ≤ 0) and (y < 0)
        sum(c[k]*α(x, y, k), k = 1 .. N)
    else
        0
# [contour plot: u]
