Задача_Робена
# Наши функции
# Ищем пересечение функций
y1(x) := -sqrt(-x)
y2(x) := -sqrt(1 - x^2)
f(x) := y1(x) - y2(x)
x1 := -0.6
# Точка пересечений функций
X1 := root(f(x1), x1) = -0.618034
z(x) :=
    if (x ≥ X1) and (x ≤ 0)
        y1(x)
    if (x ≥ -1) and (x < X1)
        y2(x)
# [plot: z(x) vs x]
pi := π
ORIGIN := 1
x1(t) := t
t11 := -1
y1(t) := 0
t12 := 0
x2(t) := cos(t)
t21 := pi
y2(t) := sin(t)
t22 := 5*pi/4
x3(t) := t
t31 := -0.618
y3(t) := -sqrt(-t)
t32 := 0
M := 20
i := 1 .. M
t(i) := (i - 1)*(-1/M)
t2(i) := pi + (i - 1)*5*pi/(17.5*M)
t3(i) := -0.618 + (i - 1)*0.618/M
mS1x[i] := x1(t(i))
mS1y[i] := y1(t(i))
mS2x[i] := x2(t2(i))
mS2y[i] := y2(t2(i))
mS3x[i] := x3(t3(i))
mS3y[i] := y3(t3(i))
xd := -0.23
yd := -0.1
Bx[i] := xd + 0.6*mS1x[i]
Bx[i + M] := xd + 0.6*mS2x[i]
Bx[i + 2*M] := xd + 0.6*mS3x[i]
By[i] := yd + 0.6*mS1y[i]
By[i + M] := yd + 0.6*mS2y[i]
N := 3*M
m := 1 .. N
By[i + 2*M] := yd + 0.6*mS3y[i]
# [plot: mS1y[m], mS2y[m], By, mS3y[m] vs mS1x[m], mS2x[m], Bx, mS3x[m]]
Определяем_систему_базисных_точек
α(x, y, m) := 1/(4*π)*ln((x - Bx[m + 1])^2 + (y - By[m + 1])^2) - 1/(4*π)*ln((x - Bx[m])^2 + (y - By[m])^2)
i := 1 .. N - 1
j := 1 .. N - 1
g1[i, j] := integral(α(x1(t), y1(t), i)*α(x1(t), y1(t), j), t = t11 .. t12)
g2[i, j] := integral(α(x2(t), y2(t), i)*α(x2(t), y2(t), j), t = t21 .. t22)
g3[i, j] := integral(α(x3(t), y3(t), i)*α(x3(t), y3(t), j), t = t31 .. t32)
g[i, j] := g1[i, j] + g2[i, j] + g3[i, j]
b1[i] := integral(α(x1(t), y1(t), i), t = t11 .. t12)
b2[i] := integral(α(x2(t), y2(t), i), t = t21 .. t22)
b3[i] := integral(α(x3(t), y3(t), i), t = t31 .. t32)
b[i] := b1[i] + b2[i] + b3[i]
c := lsolve(g, b)
Rs := sum(b[i], i = 1 .. N - 1) = 0.00725017
φ(x, y) := 1 - sum(c[k]*α(x, y, k), k = 1 .. N - 1)
R1(x, y) := integral(φ(x1(t), y1(t))*ln((x - x1(t))^2 + (y - y1(t))^2), t = t11 .. t12)
R2(x, y) := integral(φ(x2(t), y2(t))*ln((x - x2(t))^2 + (y - y2(t))^2), t = t21 .. t22)
R3(x, y) := integral(φ(x3(t), y3(t))*ln((x - x3(t))^2 + (y - y3(t))^2), t = t31 .. t32)
R(x, y) := R1(x, y) + R2(x, y) + R3(x, y)
# [contour plot: R]
