Задача_Робена
x1(t) := t
t11 := 0
y1(t) := 0
t12 := 1
dS1(t) := sqrt((d/dt(x1(t)))^2 + (d/dt(y1(t)))^2)
x2(t) := cos(t)
t21 := 0
y2(t) := sin(t)
t22 := π/2
dS2(t) := sqrt((d/dt(x2(t)))^2 + (d/dt(y2(t)))^2)
x3(t) := 0
t31 := 0
y3(t) := t
t32 := 1
dS3(t) := sqrt((d/dt(x3(t)))^2 + (d/dt(y3(t)))^2)
n11(t) := 0
n12(t) := -1
n21(t) := cos(t)
n22(t) := sin(t)
n31(t) := -1
n32(t) := 0
I1(x, y) := integral((n11(t)*(x - x1(t)) + n12(t)*(y - y1(t)))/((x - x1(t))^2 + (y - y1(t))^2), t = t11 .. t12)
I2(x, y) := integral((n21(t)*(x - x2(t)) + n22(t)*(y - y2(t)))/((x - x2(t))^2 + (y - y2(t))^2), t = t21 .. t22)
I3(x, y) := integral((n31(t)*(x - x3(t)) + n32(t)*(y - y3(t)))/((x - x3(t))^2 + (y - y3(t))^2), t = t31 .. t32)
I(x, y) := -1/(2*π)*(I1(x, y) + I2(x, y) + I3(x, y))
de := 0.1
ORIGIN := 1
M := 10
N := 3*M
i := 1 .. M
Bx[i] := de + (1 - 2*de)*(i - 1)/M
By[i] := de
Bx[i + M] := (1 - 2*de)*cos(π*(i - 1)/(2*M)) + de
By[i + M] := (1 - 2*de)*sin(π*(i - 1)/(2*M)) + de
Bx[i + 2*M] := de
By[i + 2*M] := (1 - de) - (1 - 2*de)*(i - 1)/M
# [plot: y1, y2, y3, By vs x1, x2, x3, Bx]
Определяем_систему_базисных_точек
α(x, y, m) := 1/(4*π)*ln((x - Bx[m + 1])^2 + (y - By[m + 1])^2) - 1/(4*π)*ln((x - Bx[m])^2 + (y - By[m])^2)
i := 1 .. N - 1
j := 1 .. N - 1
g1[i, j] := integral(α(x1(t), y1(t), i)*α(x1(t), y1(t), j), t = t11 .. t12)
g2[i, j] := integral(α(x2(t), y2(t), i)*α(x2(t), y2(t), j), t = t21 .. t22)
g3[i, j] := integral(α(x3(t), y3(t), i)*α(x3(t), y3(t), j), t = t31 .. t32)
g[i, j] := g1[i, j] + g2[i, j] + g3[i, j]
b1[i] := integral(α(x1(t), y1(t), i), t = t11 .. t12)
b2[i] := integral(α(x2(t), y2(t), i), t = t21 .. t22)
b3[i] := integral(α(x3(t), y3(t), i), t = t31 .. t32)
b[i] := b1[i] + b2[i] + b3[i]
c := lsolve(g, b)
transpose(c) = [-13.9932, -0.433025, -11.3371, -4.12248, -8.8206, -5.10873, -8.40637, -4.03085, -10.1902, -0.875874, -8.8681, -5.99019, -7.31316, -6.85841, -7.00383, -6.87806, -7.0222, -6.57491, -7.88401, -5.01071, -12.9909, -3.67955, -9.94893, -5.28048, -9.00436, -4.89213, -9.79645, -2.65911, -13.2543]
φ(x, y) := 1 - sum(c[k]*α(x, y, k), k = 1 .. N - 1)
φ(0, 0) = 1.28009
R1(x, y) := integral(φ(x1(t), y1(t))*ln((x - x1(t))^2 + (y - y1(t))^2), t = t11 .. t12)
R2(x, y) := integral(φ(x2(t), y2(t))*ln((x - x2(t))^2 + (y - y2(t))^2), t = t21 .. t22)
R3(x, y) := integral(φ(x3(t), y3(t))*ln((x - x3(t))^2 + (y - y3(t))^2), t = t31 .. t32)
R(x, y) := R1(x, y) + R2(x, y) + R3(x, y)
R(0, 0) = -3.88359
# [contour plot: R]
