Задача_Робена
# Наши функции
# Ищем пересечение функций
y1(x) := sqrt(1 - x^2)
y2(x) := sqrt(1 - (x - 1)^2)
f(x) := y1(x) - y2(x)
# Точка пересечений функций
X1 := root(f(x), x, 0, 1) = 0.5
z(x) :=
    if (x ≥ X1) and (x ≤ 1)
        y1(x)
    if (x ≥ 0) and (x < X1)
        y2(x)
# [plot: z(x) vs x]
ORIGIN := 1
x1(t) := t
t11 := 1
y1(t) := 0
t12 := 0
x2(t) := cos(t)
t31 := 1
y2(t) := sin(t)
t32 := 0.785
x3(t) := t
t21 := 0.785
y3(t) := t
t22 := 0
pi := π
M := 20
i := 1 .. M
t(i) := (i - 1)*1/M
t2(i) := (i - 1)*0.785/M
t3(i) := (i - 1)*0.785/M
mS1x[i] := x1(t(i))
mS1y[i] := y1(t(i))
mS2x[i] := x2(t2(i))
mS2y[i] := y2(t2(i))
mS3x[i] := x3(t3(i))
mS3y[i] := y3(t3(i))
xd := 0.25
yd := 0.1
Bx[i] := xd + 0.6*mS1x[i]
Bx[i + M] := xd + 0.6*mS2x[i]
Bx[i + 2*M] := xd + 0.6*mS3x[i]
By[i] := yd + 0.6*mS1y[i]
By[i + M] := yd + 0.6*mS2y[i]
By[i + 2*M] := yd + 0.6*mS3y[i]
N := 3*M
m := 1 .. N
# [plot: mS1y[m], mS2y[m], mS3y[m], By vs mS1x[m], mS2x[m], mS3x[m], Bx]
α(x, y, m) := 1/(4*π)*ln((x - Bx[m + 1])^2 + (y - By[m + 1])^2) - 1/(4*π)*ln((x - Bx[m])^2 + (y - By[m])^2)
i := 1 .. N - 1
j := 1 .. N - 1
g1[i, j] := integral(α(x1(t), y1(t), i)*α(x1(t), y1(t), j), t = t11 .. t12)
g2[i, j] := integral(α(x2(t), y2(t), i)*α(x2(t), y2(t), j), t = t21 .. t22)
g3[i, j] := integral(α(x3(t), y3(t), i)*α(x3(t), y3(t), j), t = t31 .. t32)
g[i, j] := g1[i, j] + g2[i, j] + g3[i, j]
b1[i] := integral(α(x1(t), y1(t), i), t = t11 .. t12)
b2[i] := integral(α(x2(t), y2(t), i), t = t21 .. t22)
b3[i] := integral(α(x3(t), y3(t), i), t = t31 .. t32)
b[i] := b1[i] + b2[i] + b3[i]
c := lsolve(g, b)
φ(x, y) := 1 - sum(c[m]*α(x, y, m), m = 1 .. N - 1)
R1(x, y) := integral(φ(x1(t), y1(t))*ln((x - x1(t))^2 + (y - y1(t))^2), t = t11 .. t12)
R2(x, y) := integral(φ(x2(t), y2(t))*ln((x - x2(t))^2 + (y - y2(t))^2), t = t21 .. t22)
R3(x, y) := integral(φ(x3(t), y3(t))*ln((x - x3(t))^2 + (y - y3(t))^2), t = t31 .. t32)
R(x, y) := R1(x, y) + R2(x, y) + R3(x, y)
y1(x) := sin(x)
y2(x) := 1 - x
f(x) := y1(x) - y2(x)
X1 := root(f(x), x, 0, 1) = 0.510973
z(x) :=
    if (x ≤ X1) and (x ≥ 0)
        y1(x)
    if (x ≤ 1) and (x ≥ X1)
        y2(x)
ORIGIN := 1
x1(t) := t
t11 := 0
y1(t) := 0
t12 := 1
x2(t) := t
t22 := 1
pi := π
y2(t) := -t + 1
t21 := 0.511
M := 30
x3(t) := t
t32 := 0.511
i := 1 .. M
y3(t) := sin(t)
t31 := 0
t(i) := (i - 1)*1/M
t2(i) := 1 + (i - 1)*(-1 + 0.511)/M
t3(i) := 0.382 + (-i + 1)*0.511/M
mS1x[i] := x1(t(i))
mS1y[i] := y1(t(i))
mS2x[i] := x2(t2(i))
mS2y[i] := y2(t2(i))
mS3x[i] := x3(t3(i))
mS3y[i] := y3(t3(i))
xd := 0.15
yd := 0.1
Bx[i] := xd + 0.6*mS1x[i]
Bx[i + M] := xd + 0.6*mS2x[i]
Bx[i + 2*M] := xd + 0.6*mS3x[i]
By[i] := yd + 0.6*mS1y[i]
By[i + M] := yd + 0.6*mS2y[i]
By[i + 2*M] := yd + 0.6*mS3y[i]
N := 3*M
m := 1 .. N
α(x, y, m) := 1/(4*π)*ln((x - Bx[m + 1])^2 + (y - By[m + 1])^2) - 1/(4*π)*ln((x - Bx[m])^2 + (y - By[m])^2)
i := 1 .. N - 1
j := 1 .. N - 1
g1[i, j] := integral(α(x1(t), y1(t), i)*α(x1(t), y1(t), j), t = t11 .. t12)
g2[i, j] := integral(α(x2(t), y2(t), i)*α(x2(t), y2(t), j), t = t21 .. t22)
g3[i, j] := integral(α(x3(t), y3(t), i)*α(x3(t), y3(t), j), t = t31 .. t32)
g[i, j] := g1[i, j] + g2[i, j] + g3[i, j]
b1[i] := integral(α(x1(t), y1(t), i), t = t11 .. t12)
b2[i] := integral(α(x2(t), y2(t), i), t = t21 .. t22)
b3[i] := integral(α(x3(t), y3(t), i), t = t31 .. t32)
b[i] := b1[i] + b2[i] + b3[i]
c := lsolve(g, b)
φ(x, y) := 1 - sum(c[m]*α(x, y, m), m = 1 .. N - 1)
R1(x, y) := integral(φ(x1(t), y1(t))*ln((x - x1(t))^2 + (y - y1(t))^2), t = t11 .. t12)
R2(x, y) := integral(φ(x2(t), y2(t))*ln((x - x2(t))^2 + (y - y2(t))^2), t = t21 .. t22)
R3(x, y) := integral(φ(x3(t), y3(t))*ln((x - x3(t))^2 + (y - y3(t))^2), t = t31 .. t32)
R(x, y) := R1(x, y) + R2(x, y) + R3(x, y)
# [contour plot: R]
φ(0, 0.4) = 1.02507
dS1(t) := sqrt((d/dt(x1(t)))^2 + (d/dt(y1(t)))^2)
dS2(t) := sqrt((d/dt(x2(t)))^2 + (d/dt(y2(t)))^2)
dS3(t) := sqrt((d/dt(x3(t)))^2 + (d/dt(y3(t)))^2)
f := integral(φ(x1(t), y1(t))^2*dS1(t), t = t11 .. t12) + integral(φ(x2(t), y2(t))^2*dS2(t), t = t21 .. t22) + integral(φ(x3(t), y3(t))^2*dS3(t), t = t31 .. t32) = 2.23475
R(-0.005, -0.005) = -3.3056
R(-0.4, -0.4)/sqrt(f) = 0.0541386
