Семестровая
Варинт_18
# Наши функции
pi := π
y11(x) := -sqrt(-x)
y21(x) := -sqrt(1 - x^2)
# [plot: y11(x), 0, y21(x) vs x]
# Криволинейный интеграл первого рода
f(x, y) := x*y
# Прямая на  оси
x1(t) := t
y1(t) := 0
t11 := 0
t12 := -1
ds1(t) := sqrt((d/dt(x1(t)))^2 + (d/dt(y1(t)))^2)
# Функция sqrt(x)
x2(t) := t
y2(t) := -sqrt(-t)
t21 := -0.618
t22 := 0
ds2(t) := sqrt((d/dt(x2(t)))^2 + (d/dt(y2(t)))^2) → sqrt(1 - 1/(4*t))
# Окружность
x3(t) := cos(t)
y3(t) := sin(t)
t31 := pi
t32 := 5*pi/16.5 + pi
ds3(t) := sqrt((d/dt(x3(t)))^2 + (d/dt(y3(t)))^2)
I3 := integral(f(x3(t), y3(t))*ds3(t), t = t31 .. t32) = 0.331767
I2 := integral(f(x2(t), y2(t))*ds2(t), t = t21 .. t22) = 0.154328
I1 := integral(f(x1(t), y1(t))*ds1(t), t = t12 .. t11) = 0
I := I1 + I2 + I3 = 0.486095
# Криволинейный интеграл второго рода
P(x, y) := x + y
Q(x, y) := x*y
dx1(t) := d/dt(x1(t))
dy1(t) := d/dt(y1(t))
dx2(t) := d/dt(x2(t))
dy2(t) := d/dt(y2(t))
dx3(t) := d/dt(x3(t))
dy3(t) := d/dt(y3(t))
I21 := integral(P(x1(t), y1(t))*dx1(t) + Q(x1(t), y1(t))*dy1(t), t = t11 .. t12) = 0.5
I22 := integral(P(x2(t), y2(t))*dx2(t) + Q(x2(t), y2(t))*dy2(t), t = t21 .. t22) = -0.419367
I23 := integral(P(x3(t), y3(t))*dx3(t) + Q(x3(t), y3(t))*dy3(t), t = t31 .. t32) = -0.839793
I2 := I21 + I22 + I23 = -0.759159
Интеграл
n11(t) := dy1(t)/ds1(t)
n12(t) := -dx1(t)/ds1(t)
n21(t) := dy2(t)/ds2(t)
n22(t) := -dx2(t)/ds2(t)
n31(t) := dy3(t)/ds3(t)
n32(t) := -dx3(t)/ds3(t)
I31(x, y) := integral(-2*[n11(t)*(x - x1(t)) + n12(t)*(y - y1(t))]*ds1(t)/([(x - x1(t))^2 + (y - y1(t))^2]*4*pi), t = t11 .. t12)
I32(x, y) := integral(-2*[n21(t)*(x - x2(t)) + n22(t)*(y - y2(t))]*ds2(t)/([(x - x2(t))^2 + (y - y2(t))^2]*4*pi), t = t21 .. t22)
I33(x, y) := integral(-2*[n31(t)*(x - x3(t)) + n32(t)*(y - y3(t))]*ds3(t)/([(x - x3(t))^2 + (y - y3(t))^2]*4*pi), t = t31 .. t32)
I3(x, y) := I31(x, y) + I32(x, y) + I33(x, y)
Проверка
x1 := -0.5
y1 := -0.5
x2 := -1
y2 := -1
x3 := -sqrt(2)/2
y3 := -sqrt(2)/2
I3(x1, y1) = 1.02259
I3(x2, y2) = -0.0150542
I3(x3, y3) = 0.503723
Интегральное_представление_Следсттвие_свва_  # Грина
