x1(t) := t
t11 := 0
y1(t) := 0
t12 := 1
dS1(t) := sqrt((d/dt(x1(t)))^2 + (d/dt(y1(t)))^2)
x2(t) := cos(t)
t21 := 0
y2(t) := sin(t)
t22 := π/2
dS2(t) := sqrt((d/dt(x2(t)))^2 + (d/dt(y2(t)))^2)
x3(t) := 0
t31 := 0
y3(t) := t
t32 := 1
dS3(t) := sqrt((d/dt(x3(t)))^2 + (d/dt(y3(t)))^2)
n11(t) := 0
n12(t) := -1
n21(t) := cos(t)
n22(t) := sin(t)
n31(t) := -1
n32(t) := 0
I1(x, y) := integral((n11(t)*(x - x1(t)) + n12(t)*(y - y1(t)))/((x - x1(t))^2 + (y - y1(t))^2), t = t11 .. t12)
I2(x, y) := integral((n21(t)*(x - x2(t)) + n22(t)*(y - y2(t)))/((x - x2(t))^2 + (y - y2(t))^2), t = t21 .. t22)
I3(x, y) := integral((n31(t)*(x - x3(t)) + n32(t)*(y - y3(t)))/((x - x3(t))^2 + (y - y3(t))^2), t = t31 .. t32)
I(x, y) := -1/(2*π)*(I1(x, y) + I2(x, y) + I3(x, y))
I(0, 1/2) = 0.5
I(sqrt(2)/2, sqrt(2)/2) = 0.5
I(1/2, 0) = 0.5
I(1/2, 1/2) = 1
I(1, 1) = 0
I(0, 0) = 0.25
u(x, y) := x^2 + y^2
Δu(x, y) := d^2/dx^2(u(x, y)) + d^2/dy^2(u(x, y))
E(x, y) := 1/(4*π)*ln(x^2 + y^2)
dux(x, y) := d/dx(u(x, y))
duy(x, y) := d/dy(u(x, y))
dS1u(t) := dux(x1(t), y1(t))*n11(t) + duy(x1(t), y1(t))*n12(t)
dS2u(t) := dux(x2(t), y2(t))*n21(t) + duy(x2(t), y2(t))*n22(t)
dS3u(t) := dux(x3(t), y3(t))*n31(t) + duy(x3(t), y3(t))*n32(t)
I1(x, y) := integral(integral(Δu(ξ, η)*E(x - ξ, y - η), η = 0 .. sqrt(1 - ξ^2)), ξ = t11 .. t12)
I21(x, y) := integral(u(x1(t), y1(t))*(n11(t)*(x - x1(t)) + n12(t)*(y - y1(t)))/((x - x1(t))^2 + (y - y1(t))^2), t = t11 .. t12)
I22(x, y) := integral(u(x2(t), y2(t))*(n21(t)*(x - x2(t)) + n22(t)*(y - y2(t)))/((x - x2(t))^2 + (y - y2(t))^2), t = t21 .. t22)
I23(x, y) := integral(u(x3(t), y3(t))*(n31(t)*(x - x3(t)) + n32(t)*(y - y3(t)))/((x - x3(t))^2 + (y - y3(t))^2), t = t31 .. t32)
I2(x, y) := -1/(2*π)*(I21(x, y) + I22(x, y) + I23(x, y))
I2(0, 0) = 0.25
I31(x, y) := integral(dS1u(t)*E(x - x1(t), y - y1(t)), t = t11 .. t12)
I32(x, y) := integral(dS2u(t)*E(x - x2(t), y - y2(t)), t = t21 .. t22)
I33(x, y) := integral(dS3u(t)*E(x - x3(t), y - y3(t)), t = t31 .. t32)
I3(x, y) := I31(x, y) + I32(x, y) + I33(x, y)
I(x, y) := I1(x, y) + I2(x, y) - I3(x, y)
x0 := 1/2
y0 := 1/2
I(1/2, 1/2) = 0.5
I(x0, y0) = 0.5
u(x0, y0) = 0.5
I1(x0, y0) = -0.56899
I2(x0, y0) = 0.659155
I3(x0, y0) = -0.409835
# Уравнение теплопроводности
