# Семестровая.
# Вариант 18.
#
# Задача теплопроводности
# Наши функции
y1(x) := -sqrt(-x)
y2(x) := -sqrt(1 - x^2)
# [plot: y1(x), y2(x) vs x]
# Ищем пересечение функций
f(x) := y1(x) - y2(x)
x1 := -0.6
# Точка пересечений функций
X1 := root(f(x1), x1) = -0.618034
z(x) :=
    if (x ≥ X1) and (x ≤ 0)
        y1(x)
    if (x ≥ -1) and (x < X1)
        y2(x)
# [plot: z(x) vs x]
Для_удобства
pi := π
N := 50
k := 1 .. N
λ[k] := -(pi*k)^2
V(k, x) := sin(pi*k*x)*sqrt(2)
C[k] := integral(z(x)*V(k, x), x = -1 .. 0)
U(x, t) := sum(C[k]*e^(λ[k]*t)*V(k, x), k = 1 .. N)
T := 0.01
# [plot: U(x, T), z(x) vs x]
Погрешность_между_z(x)*_и_U(x, 0)
P(x) := |z(x) - U(x, 0)|
xd := 0, 0.1 .. 1
P(-xd) = [0; 0.00209213; 0.00110803; 0.000812423; 0.00073629; 0.000759317; 0.000385029; 0.00112332; 0.00142563; 0.00279204; 6.15066e-16]
# [3D plot: U(x, t)]
# Обратная задача теплопроводности
N := 5
T := 0.16
y(x) := U(x, T)
cy[k] := integral(y(x)*V(x, k), x = 0 .. 1)
U2(x, t) := sum(cy[k]*e^(-λ[k]*(T - t))*V(x, k), k = 1 .. N)
z2(x) := U2(x, 0)
# [plot: z(x), y(x), z2(x) vs x]
# Погрешность
P(x) := |z2(x) - z(x)|
xd := -1, -0.9 .. 0
P(xd) = [0; 0.619383; 0.0370328; 0.645581; 0.0272818; 0.665843; 0.00223045; 0.659641; 0.0204319; 0.639905; 0]
# Регуляризация
dl := 0.001
T := 0
y(x) := U(x, T)
cy[k] := integral(y(x)*V(x, k), x = 0 .. 1)
U3(x, t) := sum(cy[k]*e^(λ[k]*t)/(dl + e^(λ[k]*T))*V(x, k), k = 1 .. N)
z3(x) := U3(x, 0)
# [plot: z(x), y(x), z3(x) vs x]
