Внутренняя_задача_Дирихле_для_ур_Пуассона
pi := π
e := e
h := -0.382
x1(t) := t
t11 := 0
y1(t) := 0
t12 := -1
dS1(t) := sqrt((d/dt(x1(t)))^2 + (d/dt(y1(t)))^2)
x2(t) := t
t21 := -1
y2(t) := -t - 1
t22 := h
dS2(t) := sqrt((d/dt(x2(t)))^2 + (d/dt(y2(t)))^2)
x3(t) := t
t31 := h
y3(t) := -sqrt(-t)
t32 := 0
dS3(t) := sqrt((d/dt(x3(t)))^2 + (d/dt(y3(t)))^2) → sqrt(1 - 1/(4*t))
dx1(t) := d/dt(x1(t))
dy1(t) := d/dt(y1(t))
dx2(t) := d/dt(x2(t))
dy2(t) := d/dt(y2(t))
dx3(t) := d/dt(x3(t))
dy3(t) := d/dt(y3(t))
_x0 := 0.34
_y0 := 0.23
ε := 0.1
E(x, y) := 1/(4*pi)*ln(x^2 + y^2)
f(x, y) :=
    if (x + _x0)^2 + (y + _y0)^2 ≤ ε^2
        1
    else
        0
n11(t) := dy1(t)/dS1(t)
n12(t) := -dx1(t)/dS1(t)
n21(t) := dy2(t)/dS2(t)
n22(t) := -dx2(t)/dS2(t)
n31(t) := dy3(t)/dS3(t)
n32(t) := -dx3(t)/dS3(t)
a(x, y) := 0
I1(x, y) := integral(integral(f(ξ, η)*E(x - ξ, y - η), η = -1 - ξ .. 0), ξ = -1 .. h) + integral(integral(f(ξ, η)*E(x - ξ, y - η), η = -sqrt(-ξ) .. 0), ξ = h .. 0)
I1(-0.2, -0.2) = -0.00970244
I21(x, y) := integral(-(n11(t)*(x - x1(t)) + n12(t)*(y - y1(t)))*dS1(t)*a(x1(t), y1(t))/(2*pi*((x - x1(t))^2 + (y - y1(t))^2)), t = t11 .. t12)
I22(x, y) := integral(-(n21(t)*(x - x2(t)) + n22(t)*(y - y2(t)))*dS2(t)*a(x2(t), y2(t))/(2*pi*((x - x2(t))^2 + (y - y2(t))^2)), t = t21 .. t22)
I23(x, y) := integral(-(n31(t)*(x - x3(t)) + n32(t)*(y - y3(t)))*dS3(t)*a(x3(t), y3(t))/(2*pi*((x - x3(t))^2 + (y - y3(t))^2)), t = t31 .. t32)
I2(x, y) := I21(x, y) + I22(x, y) + I23(x, y)
I2(-0.2, -0.2) = 0
δ := -0.02
ORIGIN := 1
_y1(x) := -sqrt(-x)
M := 10
_y2(x) := -x - 1
i := 1 .. M
N := 3*M
Bx[i] := -δ + (-1 + 2*δ)*(i - 1)/M
By[i] := -δ
Bx[i + M] := -1 + δ - (i - 1)*(-1 - h + δ)/M
By[i + M] := _y2(Bx[i + M]) + sqrt(2)*δ
Bx[i + 2*M] := h - h*(i - 1)/M
By[i + 2*M] := _y1(Bx[i + 2*M]) + δ
# [plot: By vs Bx]
α(x, y, m) := ln((x - Bx[m])^2 + (y - By[m])^2)/(4*pi)
i := 1 .. N
j := 1 .. N
g1[i, j] := integral(α(x1(t), y1(t), i)*α(x1(t), y1(t), j), t = t11 .. t12)
g2[i, j] := integral(α(x2(t), y2(t), i)*α(x2(t), y2(t), j), t = t21 .. t22)
g3[i, j] := integral(α(x3(t), y3(t), i)*α(x3(t), y3(t), j)*2^0.5, t = t31 .. t32)
g[i, j] := g1[i, j] + g2[i, j] + g3[i, j]
b[i] := I1(Bx[i], By[i]) + I2(Bx[i], By[i])
c := lsolve(g, b)
pN(x, y) := sum(c[k]*α(x, y, k), k = 1 .. N)
I31(x, y) := integral(pN(x1(t), y1(t))*E(x - x1(t), y - y1(t))*dS1(t), t = t11 .. t12)
I32(x, y) := integral(pN(x2(t), y2(t))*E(x - x2(t), y - y2(t))*dS2(t), t = t21 .. t22)
I33(x, y) := integral(pN(x3(t), y3(t))*E(x - x3(t), y - y3(t))*dS3(t), t = t31 .. t32)
I3(x, y) := I31(x, y) + I32(x, y) + I33(x, y)
u(x, y) :=
    if (y > -1 - x) and (y > -sqrt(-x)) and (x < 0) and (y < 0)
        I1(x, y) + I2(x, y) - I3(x, y)
    else
        0
# [contour plot: u]
