# Семестровая
# Вариант - 17
y1(x) := 0
y2(x) := -sqrt(-x)
y3(x) := -1 - x
# [plot: y1(x), y2(x), y3(x) vs x]
# Криволинейный интеграл первого рода
f(x, y) := x*y
S1
x1(t) := t
t11 := 0
y1(t) := 0
t12 := -1
dS1(t) := sqrt((d/dt(x1(t)))^2 + (d/dt(y1(t)))^2)
S2
x2(t) := t
t21 := -1
y2(t) := -t - 1
t22 := -0.382
dS2(t) := sqrt((d/dt(x2(t)))^2 + (d/dt(y2(t)))^2)
S3
x3(t) := t
t31 := -0.382
y3(t) := -sqrt(-t)
t32 := 0
dS3(t) := sqrt((d/dt(x3(t)))^2 + (d/dt(y3(t)))^2)
I1 := integral(f(x1(t), y1(t))*dS1(t), t = t12 .. t11) = 0
I2 := integral(f(x2(t), y2(t))*dS2(t), t = t21 .. t22) = 0.158796
I3 := integral(f(x3(t), y3(t))*dS3(t), t = t31 .. t32) = 0.0516093
Iq := I1 + I2 + I3 = 0.210405
# Криволинейный интеграл второго рода
P(x, y) := x + y
Q(x, y) := x*y
dx1(t) := d/dt(x1(t))
dy1(t) := d/dt(y1(t))
dx2(t) := d/dt(x2(t))
dy2(t) := d/dt(y2(t))
dx3(t) := d/dt(x3(t))
dy3(t) := d/dt(y3(t))
I21 := integral(P(x1(t), y1(t))*dx1(t) + Q(x1(t), y1(t))*dy1(t), t = t11 .. t12) = 0.5
I22 := integral(P(x2(t), y2(t))*dx2(t) + Q(x2(t), y2(t))*dy2(t), t = t21 .. t22) = -0.730286
I23 := integral(P(x3(t), y3(t))*dx3(t) + Q(x3(t), y3(t))*dy3(t), t = t31 .. t32) = -0.193881
Iw := I21 + I22 + I23 = -0.424167
# Криволинейный интеграл
n11(t) := dy1(t)/dS1(t)
n12(t) := -dx1(t)/dS1(t)
n21(t) := dy2(t)/dS2(t)
n22(t) := -dx2(t)/dS2(t)
n31(t) := dy3(t)/dS3(t)
n32(t) := -dx3(t)/dS3(t)
I31(x, y) := integral(-2*(n11(t)*(x - x1(t)) + n12(t)*(y - y1(t)))*dS1(t)/(((x - x1(t))^2 + (y - y1(t))^2)*4*π), t = t11 .. t12)
I32(x, y) := integral(-2*(n21(t)*(x - x2(t)) + n22(t)*(y - y2(t)))*dS2(t)/(((x - x2(t))^2 + (y - y2(t))^2)*4*π), t = t21 .. t22)
I33(x, y) := integral(-2*(n31(t)*(x - x3(t)) + n32(t)*(y - y3(t)))*dS3(t)/(((x - x3(t))^2 + (y - y3(t))^2)*4*π), t = t31 .. t32)
I3(x, y) := I31(x, y) + I32(x, y) + I33(x, y)
Проверка
n11 := -1
n12 := -1  # Вне_контура
n21 := -0.5
n22 := -0.5  # На_контуре
n31 := -0.4
n32 := -0.4  # Внутри_контура
I3(n11, n12) = 1.14576e-5  # Вне_контура_0
I3(n21, n22) = 0.500041  # На_контуре_0.5
I3(n31, n32) = 1  # Внутри_контура_1
1.4
E(x, y) := ln(x^2 + y^2)/(4*π)
u(x, y) := x^2 + y^2
Δu(x, y) := d^2/dx^2(u(x, y)) + d^2/dy^2(u(x, y)) → 4
dux(x, y) := d/dx(u(x, y))
duy(x, y) := d/dy(u(x, y))
dS1u(t) := dux(x1(t), y1(t))*n11(t) + duy(x1(t), y1(t))*n12(t)
dS2u(t) := dux(x2(t), y2(t))*n21(t) + duy(x2(t), y2(t))*n22(t)
dS3u(t) := dux(x3(t), y3(t))*n31(t) + duy(x3(t), y3(t))*n32(t)
I4(x, y) := integral(integral(Δu(ξ, η)*E(x - ξ, y - η), η = 0 .. -1 - ξ), ξ = 0 .. -0.382) + integral(integral(Δu(ξ, η)*E(x - ξ, y - η), η = 0 .. -sqrt(-ξ)), ξ = -0.382 .. -1)
I51(x, y) := integral(-(n11(t)*(x - x1(t)) + n12(t)*(y - y1(t)))*u(x1(t), y1(t))*dS1(t)/(2*π((x - x1(t))^2 + (y - y1(t))^2)), t = t11 .. t12)
I52(x, y) := integral(-(n21(t)*(x - x2(t)) + n22(t)*(y - y2(t)))*u(x2(t), y2(t))*dS2(t)/(2*π((x - x2(t))^2 + (y - y2(t))^2)), t = t21 .. t22)
I53(x, y) := integral(-(n31(t)*(x - x3(t)) + n32(t)*(y - y3(t)))*u(x3(t), y3(t))*dS3(t)/(2*π((x - x3(t))^2 + (y - y3(t))^2)), t = t31 .. t32)
I5(x, y) := I51(x, y) + I52(x, y) + I53(x, y)
I61(x, y) := integral(dS1u(t)*E(x - x1(t), y - y1(t))*dS1(t), t = t11 .. t12)
I62(x, y) := integral(dS2u(t)*E(x - x2(t), y - y2(t))*dS2(t), t = t21 .. t22)
I63(x, y) := integral(dS3u(t)*E(x - x3(t), y - y3(t))*dS3(t), t = t31 .. t32)
I6(x, y) := I61(x, y) + I62(x, y) + I63(x, y)
I(x, y) := I4(x, y) + I5(x, y) - I6(x, y)
Проверка
n11 := -1
n12 := -1  # Вне_контура
n21 := -0.5
n22 := -0.5  # На_контуре
n31 := -0.4
n32 := -0.4  # Внутри_контура
I3(n11, n12) = 1.14576e-5  # Вне_контура_0
I3(n21, n22) = 0.500041  # На_контуре_0.5
I3(n31, n32) = 1  # Внутри_контура_1
x1(t) := t
t11 := -1
y1(t) := 0
t12 := 0
x2(t) := t
t21 := -1
y2(t) := -t - 1
t22 := -0.382
x3(t) := t
t31 := -0.382
y3(t) := -sqrt(-t)
t32 := 0
de := -0.03
ORIGIN := 1
M := 20
i := 1 .. M
t(i) := (i - 1)*(-1/M)
t2(i) := -1 + (i - 1)*(1 - 0.382)/M
t3(i) := -0.382 + (i - 1)*0.382/M
mS1x[i] := x1(t(i))
mS1y[i] := y1(t(i))
mS2x[i] := x2(t2(i))
mS2y[i] := y2(t2(i))
mS3x[i] := x3(t3(i))
mS3y[i] := y3(t3(i))
xd := 0.04
yd := 0.03
Bx[i] := xd + 1.1*mS1x[i]
Bx[i + M] := xd + 1.1*mS2x[i]
Bx[i + 2*M] := xd + 1.1*mS3x[i]
By[i] := yd + 1.1*mS1y[i]
By[i + M] := yd + 1.1*mS2y[i]
By[i + 2*M] := yd + 1.1*mS3y[i]
N := 3*M
m := 1 .. N
# [plot: mS1y[m], mS2y[m], mS3y[m], By vs mS1x[m], mS2x[m], mS3x[m], Bx]
α(x, y, m) := ln((x - Bx[m])^2 + (y - By[m])^2)
Определяем_систему_базисных_точек
i := 1 .. N
j := 1 .. N
g1[i, j] := integral(α(x1(t), y1(t), i)*α(x1(t), y1(t), j), t = t11 .. t12)
g2[i, j] := integral(α(x2(t), y2(t), i)*α(x2(t), y2(t), j), t = t21 .. t22)
g3[i, j] := integral(α(x3(t), y3(t), i)*α(x3(t), y3(t), j), t = t31 .. t32)
κ := 0.3
C1 := -κ
C2 := κ
g[i, j] := g1[i, j] + g2[i, j] + g3[i, j]
b1[i] := integral(C1*α(x1(t), y1(t), i), t = t11 .. t12)
b2[i] := integral(0*α(x2(t), y2(t), i), t = t21 .. t22)
b3[i] := integral(C2*α(x3(t), y3(t), i), t = t31 .. t32)
b[i] := b1[i] + b2[i] + b3[i]
c := lsolve(g, b)
transpose(c) = [
    -0.167327, 0.213352, -0.00314308, 0.032238, 0.00990684, 0.0134726, 0.00850592, 0.00793856, 0.00613313, 0.00513125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]
ε := 0.1
x0 := -0.4
y0 := -0.3
f(x, y) :=
    if (x - x[0])^2 + (y - y[0])^2 ≤ ε^2
        1
    else
        0
u(x, y) :=
    if (y ≥ -1 - x) and (y ≥ -sqrt(-x)) and (x ≤ 0) and (y < 0)
        sum(c[k]*α(x, y, k), k = 1 .. N)
    else
        0
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