# Семестровая
# Вариант - 17
S1(x) := 0
S2(x) := -sqrt(-x)
S3(x) := -(1 + x)
# [plot: S1(x), S2(x), S3(x) vs x]
# Ищем пересечение двух функций
f(x) := S2(x) - S3(x)
x1 := -0.4
# Точка пересечения функций
X1 := root(f(x1), x1) = -0.381966
z(x) :=
    if (x ≥ X1) and (x ≤ 0)
        S2(x)
    if (x ≥ -1) and (x < X1)
        S3(x)
# [plot: z(x) vs x]
# Задача теплопроводности
N := 50
V(k, x) := sin(π*k*x)*sqrt(2)
k := 1 .. N
λ[k] := -(π*k)^2
C[k] := integral(z(x)*V(k, x), x = -1 .. 0)
U(x, t) := sum(C[k]*e^(λ[k]*t)*V(k, x), k = 1 .. N)
T := 0.01
# [plot: U(x, T), z(x) vs x]
# Погрешность между z(x) и U(x,0)
P(x) := |z(x) - U(x, 0)|
g := -1, -0.9 .. 0
P(g) = [3.40763e-17; 7.0867e-5; 9.07799e-5; 0.000172983; 0.000236608; 0.000250465; 0.000264436; 0.000693293; 0.000996721; 0.00201599; 0]
# [3D plot: U(x, t)]
# Обратная задача теплопроводности
N := 5
T := 0.01
y(x) := U(x, T)
Cy[k] := integral(y(x)*V(k, x), x = 0 .. 1)
U2(x, t) := sum(Cy[k]*e^(-λ[k]*(T - t))*V(x, k), k = 1 .. N)
z2(x) := U2(x, 0)
# [plot: z(x), y(x), z2(x) vs x]
# Погрешность между z(x) и U(x,0)
P(x) := |z(x) - U(x, 0)|
g := -1, -0.9 .. 0
P(g) = [3.40763e-17; 7.0867e-5; 9.07799e-5; 0.000172983; 0.000236608; 0.000250465; 0.000264436; 0.000693293; 0.000996721; 0.00201599; 0]
# Регуляризация
dl := 0.001
T := 0.16
y(x) := U(x, T)
Cy[k] := integral(y(x)*V(x, k), x = 0 .. 1)
U3(x, t) := sum(Cy[k]*e^(λ[k]*t)/(dl + e^(λ[k]*T))*V(x, k), k = 1 .. N)
z3(x) := U3(x, 0)
# [plot: z(x), y(x), z3(x) vs x]
