Внутренняя_задача_Дирихле_для_ур_Лапласа
S1
x1(t) := t
t11 := 0
x0 := -0.382
y1(t) := 0
t12 := -1
dS1(t) := sqrt((d/dt(x1(t)))^2 + (d/dt(y1(t)))^2) → 1
S2
x2(t) := t
t21 := -1
y2(t) := -t - 1
t22 := x0
dS2(t) := sqrt((d/dt(x2(t)))^2 + (d/dt(y2(t)))^2) → sqrt(2)
S3
x3(t) := t
t31 := x0
y3(t) := -sqrt(-t)
t32 := 0
dS3(t) := sqrt((d/dt(x3(t)))^2 + (d/dt(y3(t)))^2) → sqrt(1 - 1/(4*t))
dx1(t) := d/dt(x1(t)) → 1
dy1(t) := d/dt(y1(t)) → 0
dx2(t) := d/dt(x2(t)) → 1
dy2(t) := d/dt(y2(t)) → -1
dx3(t) := d/dt(x3(t)) → 1
dy3(t) := d/dt(y3(t)) → 1/(2*sqrt(-t))
E(x, y) := ln(x^2 + y^2)/(4*π)
n11(t) := dy1(t)/dS1(t) → 0
n12(t) := dx1(t)/dS1(t) → 1
n21(t) := dy2(t)/dS2(t) → -sqrt(2)/2
n22(t) := dx2(t)/dS2(t) → sqrt(2)/2
n31(t) := dy3(t)/dS3(t) → 1/(2*sqrt(-t)*sqrt(1 - 1/(4*t)))
n32(t) := dx3(t)/dS3(t) → (1 - 1/(4*t))^(-1/2)
_x0 := 0.35
_y0 := 0.23
_ε := 0.1
f(x, y) :=
    if (x + _x0)^2 + (y + _y0)^2 < _ε^2
        1
    else
        0
pi := π
a(x, y) := 0
F1(x, y) := integral(integral(f(ξ, η)*E(x - ξ, y - η), η = -1 - ξ .. 0), ξ = -1 .. x0) + integral(integral(f(ξ, η)*E(x - ξ, y - η), η = -sqrt(-ξ) .. 0), ξ = x0 .. 0)
F21(x, y) := integral(-(n11(t)*(x - x1(t)) + n12(t)*(y - y1(t)))*dS1(t)*a(x1(t), y1(t))/(2*pi*((x - x1(t))^2 + (y - y1(t))^2)), t = t11 .. t12)
F22(x, y) := integral(-(n21(t)*(x - x2(t)) + n22(t)*(y - y2(t)))*dS2(t)*a(x2(t), y2(t))/(2*pi*((x - x2(t))^2 + (y - y2(t))^2)), t = t21 .. t22)
F23(x, y) := integral(-(n31(t)*(x - x3(t)) + n32(t)*(y - y3(t)))*dS3(t)*a(x3(t), y3(t))/(2*pi*((x - x3(t))^2 + (y - y3(t))^2)), t = t31 .. t32)
F2(x, y) := F21(x, y) + F22(x, y) + F23(x, y)
ORIGIN := 1
M := 20
N := 3*M
m := 1 .. N
i := 1 .. M
t(i) := (i - 1)*(-1/M)
t2(i) := -1 + (i - 1)*(1 - 0.382)/M
t3(i) := -0.382 + (i - 1)*0.382/M
mS1x[i] := x1(t(i))
mS1y[i] := y1(t(i))
mS2x[i] := x2(t2(i))
mS2y[i] := y2(t2(i))
mS3x[i] := x3(t3(i))
mS3y[i] := y3(t3(i))
xd := 0.05
yd := 0.03
Bx[i] := xd + 1.3*mS1x[i]
Bx[i + M] := xd + 1.3*mS2x[i]
Bx[i + 2*M] := xd + 1.3*mS3x[i]
By[i] := yd + 1.3*mS1y[i]
By[i + M] := yd + 1.3*mS2y[i]
By[i + 2*M] := yd + 1.3*mS3y[i]
# [plot: By vs Bx]
κ := 0.3
C1 := -κ
C2 := κ
α(x, y, m) := ln((x - Bx[m])^2 + (y - By[m])^2)
i := 1 .. N
j := 1 .. N
g1[i, j] := integral(α(x1(t), y1(t), i)*α(x1(t), y1(t), j), t = t11 .. t12)
g2[i, j] := integral(α(x2(t), y2(t), i)*α(x2(t), y2(t), j), t = t21 .. t22)
g3[i, j] := integral(α(x3(t), y3(t), i)*α(x3(t), y3(t), j), t = t31 .. t32)
g[i, j] := g1[i, j] + g2[i, j] + g3[i, j]
F(x, y) := F1(x, y) + F2(x, y)
b1[i] := integral(C1*α(x1(t), y1(t), i), t = t11 .. t12)
b2[i] := integral(0*α(x2(t), y2(t), i), t = t21 .. t22)
b3[i] := integral(C2*α(x3(t), y3(t), i), t = t31 .. t32)
b[i] := b1[i] + b2[i] + b3[i]
b[i] := F1(Bx[i], By[i]) + F2(Bx[i], By[i])
c := lsolve(g, b)
pN(x, y) := sum(c[m]*α(x, y, m), m = 1 .. N)
F31(x, y) := integral(pN(x1(t), y1(t))*E(x - x1(t), y - y1(t))*dS1(t), t = t11 .. t12)
F32(x, y) := integral(pN(x2(t), y2(t))*E(x - x2(t), y - y2(t))*dS2(t), t = t21 .. t22)
F33(x, y) := integral(pN(x3(t), y3(t))*E(x - x3(t), y - y3(t))*dS3(t), t = t31 .. t32)
F3(x, y) := F31(x, y) + F32(x, y) + F33(x, y)
u(x, y) :=
    if (y > -1 - x) and (y > -sqrt(-x)) and (x < 0) and (y < 0)
        F1(x, y) + F2(x, y) - F3(x, y)
    else
        0
# [contour plot: u]
