Внутренняя_задача_Дирихле_для_ур_Пуассона
pi := π
e := e
z(x) :=
    if (x ≥ 0) and (x ≤ (5^0.5 - 1)/2)
        x^0.5
    if (x > (5^0.5 - 1)/2) and (x ≤ 1)
        (-1*x^2 + 1)^0.5
# [plot: z(x) vs x]
(5^0.5 - 1)/2 = 0.618034
x1(t) := t
t11 := 0
y1(t) := 0
t12 := 1
acos((5^0.5 - 1)/2)
dS1(t) := sqrt((d/dt(x1(t)))^2 + (d/dt(y1(t)))^2)
x2(t) := cos(t)
t21 := 0
y2(t) := sin(t)
t22 := acos((5^0.5 - 1)/2)
dS2(t) := sqrt((d/dt(x2(t)))^2 + (d/dt(y2(t)))^2)
x3(t) := t
t31 := 0
y3(t) := t^0.5
t32 := (5^0.5 - 1)/2
dS3(t) := sqrt((d/dt(x3(t)))^2 + (d/dt(y3(t)))^2) → sqrt(0.25/t^1.0 + 1)
dx1(t) := d/dt(x1(t))
dy1(t) := d/dt(y1(t))
dx2(t) := d/dt(x2(t))
dy2(t) := d/dt(y2(t))
dx3(t) := d/dt(x3(t))
dy3(t) := d/dt(y3(t))
E(x, y) := 1/(4*pi)*ln(x^2 + y^2)
f(x, y) :=
    if (x - 0.6)^2 + (y - 0.2)^2 ≤ 0.1
        1
    else
        0
n11(t) := dy1(t)/dS1(t)
n12(t) := -dx1(t)/dS1(t)
n21(t) := dy2(t)/dS2(t)
n22(t) := -dx2(t)/dS2(t)
# [3D plot: f(x, y)]
n31(t) := dy3(t)/dS3(t)
n32(t) := -dx3(t)/dS3(t)
u(x, y) := x^2 + y^2
a(x, y) := 0
dux(x, y) := d/dx(u(x, y))
duy(x, y) := d/dy(u(x, y))
I1(x, y) := integral(integral(f(ξ, η)*E(x - ξ, y - η), η = 0 .. sqrt(ξ)), ξ = 0 .. 0.618) + integral(integral(f(ξ, η)*E(x - ξ, y - η), η = 0 .. sqrt(1 - ξ^2)), ξ = 0.618 .. 1)
I1(0.5, 0.5) = -0.0539913
I21(x, y) := integral(-(n11(t)*(x - x1(t)) + n12(t)*(y - y1(t)))*u(x1(t), y1(t))*dS1(t)*a(x1(t), y1(t))/(2*pi*((x - x1(t))^2 + (y - y1(t))^2)), t = t11 .. t12)
I22(x, y) := integral(-(n21(t)*(x - x2(t)) + n22(t)*(y - y2(t)))*u(x2(t), y2(t))*dS2(t)*a(x2(t), y2(t))/(2*pi*((x - x2(t))^2 + (y - y2(t))^2)), t = t21 .. t22)
I23(x, y) := integral(-(n31(t)*(x - x3(t)) + n32(t)*(y - y3(t)))*u(x3(t), y3(t))*dS3(t)*a(x3(t), y3(t))/(2*pi*((x - x3(t))^2 + (y - y3(t))^2)), t = t31 .. t32)
I2(x, y) := I21(x, y) + I22(x, y) + I23(x, y)
u(x) := I1 + I2
u(x, y) := ln((x - 1)^2 + y^2)
d^2/dx^2(u(x, y)) → 2/(y^2 + (x - 1)^2) - (2*x - 2)^2/(y^2 + (x - 1)^2)^2
d^2/dy^2(u(x, y)) → 2/(y^2 + (x - 1)^2) - 4*y^2/(y^2 + (x - 1)^2)^2
de := 0.02
ORIGIN := 1
M := 10
i := 1 .. M
N := 3*M
Bx[i] := -de + (1 + 2*de)*(i - 1)/M
By[i] := -de
Bx[i + M] := (1 + 2*de)*cos(pi*(i - 1)/(4*M)) - de
By[i + M] := (1 + 2*de)*sin(pi*(i - 1)/(4*M)) - de
Bx[i + 2*M] := -de + (1 + 2*de)*0.707*i/M
By[i + 2*M] := -de + (1 + 2*de)*0.707*i/M
# [plot: By vs Bx]
α(x, y, m) := ln((x - Bx[m])^2 + (y - By[m])^2)/(4*pi)
Определяем_систему_базисных_точек
i := 1 .. N
j := 1 .. N
g1[i, j] := integral(α(x1(t), y1(t), i)*α(x1(t), y1(t), j), t = t11 .. t12)
g2[i, j] := integral(α(x2(t), y2(t), i)*α(x2(t), y2(t), j), t = t21 .. t22)
g3[i, j] := integral(α(x3(t), y3(t), i)*α(x3(t), y3(t), j)*2^0.5, t = t31 .. t32)
κ := 0.3
C1 := -κ
C2 := κ
g[i, j] := g1[i, j] + g2[i, j] + g3[i, j]
b[i] := I1(Bx[i], By[i]) + I2(Bx[i], By[i])
c := lsolve(g, b)
transpose(c) = [0.18019, -0.51701, 0.237296, -0.230251, -0.136383, 0.00374704, -0.00328223, -0.0595884, -0.135225, 0.200561, -0.128468, 0.218905, -0.0340001, -0.0186239, -0.0383246, -0.0338417, -0.0458591, -0.066488, -0.173118, 0.0617899, -0.40649, 4.30057, -16.7219, 45.8443, -66.5022, 59.1526, -45.1203, 25.3325, -6.28776, 0.537817]
pN(x, y) := sum(c[k]*α(x, y, k), k = 1 .. N)
I31(x, y) := integral(pN(x1(t), y1(t))*E(x - x1(t), y - y1(t))*dS1(t), t = t11 .. t12)
I32(x, y) := integral(pN(x2(t), y2(t))*E(x - x2(t), y - y2(t))*dS2(t), t = t21 .. t22)
I33(x, y) := integral(pN(x3(t), y3(t))*E(x - x3(t), y - y3(t))*dS3(t), t = t31 .. t32)
I3(x, y) := I31(x, y) + I32(x, y) + I33(x, y)
u(x, y) :=
    if (x ≥ 0) and (y ≥ 0) and (y ≤ x) and (x^2 + y^2 ≤ 1)
        -I3(x, y) + I1(x, y) + I2(x, y)
    else
        0
# [contour plot: u]
