y1(x) := 0
y2(x) := -x + 1
y3(x) := sqrt(x)
# [plot: y1(x) (1), y2(x) (1), y3(x) (1) vs x (1)]
# Криволинейный интеграл первого рода
f(x, y) := 2
S1
x1(t) := t
t11 := 0
t12 := 1
y1(t) := 0
dS1(t) := sqrt((d^1/dt^1(x1(t)))^2 + (d^1/dt^1(y1(t)))^2)
S2
x2(t) := t
t21 := 1
t22 := root(y2(x) - y3(x), x, -1, 1) = 0.381966
y2(t) := -t + 1
dS2(t) := sqrt((d^1/dt^1(x2(t)))^2 + (d^1/dt^1(y2(t)))^2)
S3
x3(t) := t
t31 := 0.382
t32 := 0
y3(t) := sqrt(t)
dS3(t) := sqrt((d^1/dt^1(x3(t)))^2 + (d^1/dt^1(y3(t)))^2)
I1 := integral(f(x1(t), y1(t))*dS1(t), t = t11 .. t12) = 2
I2 := integral(f(x2(t), y2(t))*dS2(t), t = t22 .. t21) = 1.74806
I3 := integral(f(x3(t), y3(t))*dS3(t), t = t32 .. t31) = 1.50215
# Криволинейный интеграл второго рода
P(x, y) := y
Q(x, y) := 0
dx1(t) := d/dt(x1(t))
dy1(t) := d/dt(y1(t))
dx2(t) := d/dt(x2(t))
dy2(t) := d/dt(y2(t))
dx3(t) := d/dt(x3(t))
dy3(t) := d/dt(y3(t))
I1 := integral(P(x1(t), y1(t))*dx1(t) + Q(x1(t), y1(t))*dy1(t), t = t11 .. t12) = 0
I2 := integral(P(x2(t), y2(t))*dx2(t) + Q(x2(t), y2(t))*dy2(t), t = t22 .. t21) = 0.190983
I3 := integral(P(x3(t), y3(t))*dx3(t) + Q(x3(t), y3(t))*dy3(t), t = t32 .. t31) = 0.1574
I := I1 + I2 + I3 = 0.348383
n11(t) := dy1(t)/dS1(t)
n12(t) := -dx1(t)/dS1(t)
n21(t) := dy2(t)/dS2(t)
n22(t) := -dx2(t)/dS2(t)
n31(t) := dy3(t)/dS3(t)
n32(t) := -dx3(t)/dS3(t)
I31(x, y) := integral(-2*(n11(t)*(x - x1(t)) + n12(t)*(y - y1(t)))*dS1(t)/(((x - x1(t))^2 + (y - y1(t))^2)*4*π), t = t11 .. t12)
I32(x, y) := integral(-2*(n21(t)*(x - x2(t)) + n22(t)*(y - y2(t)))*dS2(t)/(((x - x2(t))^2 + (y - y2(t))^2)*4*π), t = t21 .. t22)
I33(x, y) := integral(-2*(n31(t)*(x - x3(t)) + n32(t)*(y - y3(t)))*dS3(t)/(((x - x3(t))^2 + (y - y3(t))^2)*4*π), t = t31 .. t32)
I3(x, y) := I31(x, y) + I32(x, y) + I33(x, y)
Проверка
n11 := 1
n12 := 1  # Вне_контура
n21 := 0.6
n22 := 0  # На_контуре
n31 := 0.4
n32 := 0.4  # Внутри_контура
I3(n11, n12) = 1.2093e-6  # Вне_контура_0
I3(n21, n22) = 0.50001  # На_контуре_0.5
I3(n31, n32) = 1.00003  # Внутри_контура_1
