Вариант1
'' := 0.796
y1(x) := 0
y2(x) := sqrt(1 - x^2)
y3(x) := x
# [plot: y1(x), y2(x), y3(x) vs x]
# Криволинейный интеграл 1-го рода
f(x, y) := 1
S1
x1(t) := t
t11 := 0
y1(t) := 0
t12 := 1
dS1(t) := sqrt((d/dt(x1(t)))^2 + (d/dt(y1(t)))^2)
S2
x2(t) := sin(t)
t31 := 1
y2(t) := cos(t)
t32 := 0.785
dS2(t) := sqrt((d/dt(x2(t)))^2 + (d/dt(y2(t)))^2)
S3
x3(t) := t
t21 := 0.785
y3(t) := t
t22 := 0
' := 3.29
dS3(t) := sqrt((d/dt(x3(t)))^2 + (d/dt(y3(t)))^2)*'
1
I1 := -integral(f(x1(t), y1(t))*dS1(t), t = t12 .. t11) = 1
I2 := integral(f(x2(t), y2(t))*dS2(t), t = t22 .. t21) = 0.785
I3 := integral(f(x3(t), y3(t))*dS3(t), t = t32 .. t31) = 1.00034
Iq := I1 + I2 + I3 = 2.78534
# Криволинейный интеграл 2-го рода
P(x, y) := x + y
Q(x, y) := x*y
dx1(t) := d/dt(x1(t))
dy1(t) := d/dt(y1(t))
dx2(t) := d/dt(x2(t))
dy2(t) := d/dt(y2(t))
dx3(t) := d/dt(x3(t))
dy3(t) := d/dt(y3(t))
I21 := integral(P(x1(t), y1(t))*dx1(t) + Q(x1(t), y1(t))*dy1(t), t = t11 .. t12) = 0.5
I22 := -integral(P(x2(t), y2(t))*dx2(t) + Q(x2(t), y2(t))*dy2(t), t = t21 .. t22) = 0.77459
I23 := integral(P(x3(t), y3(t))*dx3(t) + Q(x3(t), y3(t))*dy3(t), t = t32 .. t31) = 0.555863
Iw := I21 + I22 + I23 = 1.83045
# Производная по нормали
n11(t) := dy1(t)/dS1(t)
n12(t) := -dx1(t)/dS1(t)
n21(t) := dy2(t)/dS2(t)
n22(t) := -dx2(t)/dS2(t)
n31(t) := dy3(t)/dS3(t)
° := 23.95
n32(t) := -dx3(t)/dS3(t)
I31(x, y) := integral(-2*(n11(t)*(x - x1(t)) + n12(t)*(y - y1(t)))*dS1(t)/(((x - x1(t))^2 + (y - y1(t))^2)*4*π), t = t11 .. t12)
I32(x, y) := integral(-2*(n21(t)*(x - x2(t)) + n22(t)*(y - y2(t)))*dS2(t)/(((x - x2(t))^2 + (y - y2(t))^2)*4*π), t = t21 .. t22)
I33(x, y) := integral(-2*(n31(t)*(x - x3(t)) + n32(t)*(y - y3(t)))*dS3(t)/(((x - x3(t))^2 + (y - y3(t))^2)*4*π), t = t31 .. t32)
I3(x, y) := I31(x, y) + I32(x, y) + I33(x, y)*°  # ⁋⁋  # Y  # ??  # V
Проверка
n11 := 2
n12 := 2  # Вне_контура
n21 := 0.1
n22 := 0.1  # На_контуре
n31 := 0.5
n32 := 0.1  # Внутри_контура
I3(n11, n12) = 3.4658e-5  # Вне_контура_0
I3(n21, n22) = 0.499926  # На_контуре_0.5
I3(n31, n32) = 1.00017  # Внутри_контура_1
# Интегральное представление
f(x, y) := x^2 - y^2
Lf(x, y) := d^2/dx^2(f(x, y)) + d^2/dy^2(f(x, y))
dfx(x, y) := d/dx(f(x, y))
dfy(x, y) := d/dy(f(x, y))
S1(t) := integral(f(x1(t), y1(t))*dS1(t), t = t11 .. t12)
S2(t) := integral(f(x1(t), y1(t))*dS2(t), t = t22 .. t21)
S3(t) := integral(f(x1(t), y1(t))*dS3(t), t = t31 .. t32)
IQ(x, y) := integral(integral(Lf(ξ, η)*1/(4*π)*ln((x - ξ)^2 + (y - η)^2), η = -1 - ξ .. 0), ξ = -1 .. x1) + integral(integral(Lf(ξ, η)*1/(4*π)*ln((x - ξ)^2 + (y - η)^2), η = -sqrt(-ξ) .. 0), ξ = x1 .. 0)
dfn1(t) := dfx(x1(t), y1(t))*n11(t) + dfy(x1(t), y1(t))*n12(t)
dfn2(t) := dfx(x2(t), y2(t))*n21(t) + dfy(x2(t), y2(t))*n22(t)
dfn3(t) := dfx(x3(t), y3(t))*n31(t) + dfy(x3(t), y3(t))*n32(t)
I1S1(x, y) := -1/(2*π)*integral(f(x1(t), y1(t))*((x - x1(t))*n11(t) + (y - y1(t))*n12(t))/((x - x1(t))^2 + (y - y1(t))^2)*dS1(t), t = t11 .. t12)
I1S2(x, y) := -1/(2*π)*integral(f(x2(t), y2(t))*((x - x2(t))*n21(t) + (y - y2(t))*n22(t))/((x - x2(t))^2 + (y - y2(t))^2)*dS2(t), t = t22 .. t21)
I1S3(x, y) := -1/(2*π)*integral(f(x3(t), y3(t))*((x - x3(t))*n31(t) + (y - y3(t))*n32(t))/((x - x3(t))^2 + (y - y3(t))^2)*dS3(t), t = t31 .. t32)
I1S(x, y) := I1S1(x, y) + I1S2(x, y) + I1S3(x, y)
I2S1(x, y) := 1/(4*π)*integral(dfn1(t)*ln((x - x1(t))^2 + (y - y1(t))^2)*dS1(t), t = t11 .. t12)
I2S2(x, y) := 1/(4*π)*integral(dfn2(t)*ln((x - x2(t))^2 + (y - y2(t))^2)*dS2(t), t = t21 .. t22)
I2S3(x, y) := 1/(4*π)*integral(dfn3(t)*ln((x - x3(t))^2 + (y - y3(t))^2)*dS3(t), t = t31 .. t32)
I2S(x, y) := I2S1(x, y) + I2S2(x, y) + I2S3(x, y)
F(x, y) := IQ(x, y) + I1S(x, y) - I2S(x, y)
F(x, y) := (e*x*y)/π
F(1, 1) = 0.865256
f(1, 1) = 0
F(1/2, 1/sqrt(3)) = 0.249778
f(1/2, 1/3) = 0.138889
F(1/2, sqrt(3)/2) = 0.374667
f(1/2, sqrt(3)/2) = -0.5
# Сделаем проверку
M1(2, 2)
M2(0.5, 0.5)
M3(0.54, 0.2)
I3(2, 2) = 3.4658e-5  # Вне контура должно быть 0
I3(0.5, 0.5) = 0.499784  # На контуре должно быть 0.5
I3(0.54, 0.201) = 1.00002  # Внутри контура должно быть 1
y2(x) := sqrt(1 - x^2)
# [plot: y1(x), y2(x), y3(x) vs x]
l(x, y) := f(x, y) - F(x, y)
# [3D plot: l(x, y)]
