pi := π
e := e
x1(t) := t
t11 := 0
y1(t) := 0
t12 := 1
dS1(t) := sqrt((d/dt(x1(t)))^2 + (d/dt(y1(t)))^2)
x2(t) := cos(t)
t21 := 0
y2(t) := sin(t)
t22 := π/2
dS2(t) := sqrt((d/dt(x2(t)))^2 + (d/dt(y2(t)))^2)
x3(t) := 0
t31 := 0
y3(t) := t
t32 := 1
dS3(t) := sqrt((d/dt(x3(t)))^2 + (d/dt(y3(t)))^2)
n11(t) := 0
n12(t) := -1
n21(t) := cos(t)
n22(t) := sin(t)
n31(t) := -1
n32(t) := 0
I1(x, y) := integral((n11(t)*(x - x1(t)) + n12(t)*(y - y1(t)))/((x - x1(t))^2 + (y - y1(t))^2), t = t11 .. t12)
I2(x, y) := integral((n21(t)*(x - x2(t)) + n22(t)*(y - y2(t)))/((x - x2(t))^2 + (y - y2(t))^2), t = t21 .. t22)
I3(x, y) := integral((n31(t)*(x - x3(t)) + n32(t)*(y - y3(t)))/((x - x3(t))^2 + (y - y3(t))^2), t = t31 .. t32)
I(x, y) := -1/(2*π)*(I1(x, y) + I2(x, y) + I3(x, y))
I(0, 1/2) = 0.5
I(1/2, 0) = 0.5
I(sqrt(2)/2, sqrt(2)/2) = 0.5
I(1/2, 1/2) = 1
I(0, 0) = 0.25
I(1, 1) = 0
u(x, y) := x^2 + y^3
Δu(x, y) := d^2/dx^2(u(x, y)) + d^2/dy^2(u(x, y))
E(x, y) := ln(x^2 + y^2)/(4*π)
dux(x, y) := d/dx(u(x, y))
duy(x, y) := d/dy(u(x, y))
dS1u(t) := dux(x1(t), y1(t))*n11(t) + duy(x1(t), y1(t))*n12(t)
dS2u(t) := dux(x2(t), y2(t))*n21(t) + duy(x2(t), y2(t))*n22(t)
dS3u(t) := dux(x3(t), y3(t))*n31(t) + duy(x3(t), y3(t))*n32(t)
I1(x, y) := integral(integral(Δu(z, n)*E(x - z, y - n), n = 0 .. (1 - z^2)^(1/2)), z = t11 .. t12)
I21(x, y) := integral(u(x1(t), y1(t))*(n11(t)*(x - x1(t)) + n12(t)*(y - y1(t)))/((x - x1(t))^2 + (y - y1(t))^2), t = t11 .. t12)
I22(x, y) := integral(u(x2(t), y2(t))*(n21(t)*(x - x2(t)) + n22(t)*(y - y2(t)))/((x - x2(t))^2 + (y - y2(t))^2), t = t21 .. t22)
I23(x, y) := integral(u(x3(t), y3(t))*(n31(t)*(x - x3(t)) + n32(t)*(y - y3(t)))/((x - x3(t))^2 + (y - y3(t))^2), t = t31 .. t32)
I2(x, y) := -1/(2*π)*(I21(x, y) + I22(x, y) + I23(x, y))
I31(x, y) := integral(dS1u(t)*E(x - x1(t), y - y1(t)), t = t11 .. t12)
I32(x, y) := integral(dS2u(t)*E(x - x2(t), y - y2(t)), t = t21 .. t22)
I33(x, y) := integral(dS3u(t)*E(x - x3(t), y - y3(t)), t = t31 .. t32)
I3(x, y) := I31(x, y) + I32(x, y) + I33(x, y)
I(x, y) := I1(x, y) + I2(x, y) - I3(x, y)
x0 := 2
y0 := 1/2
I(x0, y0) = 2.40368e-7
u(x0, y0) = 4.125
z(x) :=
    if (x ≥ 0) and (x ≤ 1/2)
        x
    if (x > 1/2) and (x < 1)
        1 - x
N := 5
V(x, k) := 2^(1/2)*sin(pi*k*x)
k := 1 .. N
m := 1 .. N
λ[k] := -(π*k)^2
C[k] := integral(z(x)*V(x, k), x = 0 .. 1)
U(x, t) := sum(C[k]*e^(λ[k]*t)*V(x, k), k = 1 .. N)
# [3D plot: U(x, t)]
Обр_зад_теплопровод
T := 0.16
y(x) := U(x, T)
cy[k] := integral(y(x)*V(x, k), x = 0 .. 1)
U2(x, t) := sum(cy[k]*e^(-λ[k]*(T - t))*V(x, k), k = 1 .. N)
z2(x) := U2(x, 0)
# [plot: z(x), y(x), z2(x) vs x]
Регуляризация
dl := 0.001
T := 0.16
U3(x, t) := sum(cy[k]*e^(λ[k]*t)/(dl + e^(λ[k]*T))*V(x, k), k = 1 .. N)
z3(x) := U3(x, 0)
# [plot: z(x), y(x), z3(x) vs x]
N := 5
Думерныйслучай
a := 1/3
b := 2/3
z(x, y) :=
    r ← 0
    if (x ≥ a) and (x ≤ b) and (y ≥ a) and (y ≤ b)
        r ← 1
V(x, y, k, m) := 2*sin(pi*k*x)*sin(pi*m*y)
k := 1 .. N
m := 1 .. N
λ[k, m] := -2*(k^2 + m^2)*pi^2
λ[k, m] := -2*(k^(2 + m^2))*π^2
C[k, m] := integral(integral(z(x, y)*V(x, y, k, m), x = 0 .. 1), y = 0 .. 1)
U(x, y, t) := sum(sum(C[k, m]*e^(λ[k, m]*t)*V(x, y, k, m), m = 1 .. N), k = 1 .. N)
T := 0.1
UT(x, y) := U(x, y, T)
f(x) := UT(x, 1/2)
# [3D plot: UT(x, y)]
# [3D plot: z(x, y)]
x1(t) := t
t11 := 0
y1(t) := 0
t12 := 1
dS1(t) := sqrt((d/dt(x1(t)))^2 + (d/dt(y1(t)))^2)
x2(t) := cos(t)
t21 := 0
y2(t) := sin(t)
t22 := π/2
dS2(t) := sqrt((d/dt(x2(t)))^2 + (d/dt(y2(t)))^2)
x3(t) := 0
t31 := 0
y3(t) := t
t32 := 1
dS3(t) := sqrt((d/dt(x3(t)))^2 + (d/dt(y3(t)))^2)
n11(t) := 0
n12(t) := -1
n21(t) := cos(t)
n22(t) := sin(t)
n31(t) := -1
n32(t) := 0
I1(x, y) := integral((n11(t)*(x - x1(t)) + n12(t)*(y - y1(t)))/((x - x1(t))^2 + (y - y1(t))^2), t = t11 .. t12)
I2(x, y) := integral((n21(t)*(x - x2(t)) + n22(t)*(y - y2(t)))/((x - x2(t))^2 + (y - y2(t))^2), t = t21 .. t22)
I3(x, y) := integral((n31(t)*(x - x3(t)) + n32(t)*(y - y3(t)))/((x - x3(t))^2 + (y - y3(t))^2), t = t31 .. t32)
I(x, y) := -1/(2*π)*(I1(x, y) + I2(x, y) + I3(x, y))
ORIGIN := 1
de := 0.1
M := 10
N := 3*M
i := 1 .. M
Bx[i] := de + (1 - 2*de)*(i - 1)/M
By[i] := de
Bx[i + M] := (1 - 2*de)*cos(pi*(i - 1)/(2*M)) + de
By[i + M] := (1 - 2*de)*sin(pi*(i - 1)/(2*M)) + de
Bx[i + 2*M] := de
By[i + 2*M] := (1 - de) - (1 - 2*de)*(i - 1)/M
# [plot: y1, y2, y3, By vs x1, x2, x3, Bx]
