y1(x) := 1 - x
y2(x) := sqrt(1 - (1 - x)^2)
# [plot: y1(x), y2(x) vs x]
x0 := 0.293
S1
x1(t) := t
t11 := 0
y1(t) := 0
t12 := 1
dS1(t) := sqrt((d/dt(x1(t)))^2 + (d/dt(y1(t)))^2) → 1
S2
x2(t) := t
t21 := 1
y2(t) := 1 - t
t22 := x0
dS2(t) := sqrt((d/dt(x2(t)))^2 + (d/dt(y2(t)))^2) → sqrt(2)
S3
x3(t) := cos(t) + 1
t31 := 3*π/4
y3(t) := sin(t)
t32 := π
dS3(t) := sqrt((d/dt(x3(t)))^2 + (d/dt(y3(t)))^2) → sqrt(cos(t)^2 + sin(t)^2)
dx1(t) := d/dt(x1(t)) → 1
dy1(t) := d/dt(y1(t)) → 0
dx2(t) := d/dt(x2(t)) → 1
dy2(t) := d/dt(y2(t)) → -1
dx3(t) := d/dt(x3(t)) → -sin(t)
dy3(t) := d/dt(y3(t)) → cos(t)
E(x, y) := 1/(4*π)*ln(x^2 + y^2)
s1
n11(t) := dy1(t)/dS1(t) → 0
n12(t) := -dx1(t)/dS1(t) → -1
s2
n21(t) := dy2(t)/dS2(t) → -sqrt(2)/2
n22(t) := -dx2(t)/dS2(t) → -sqrt(2)/2
s3
n31(t) := dy3(t)/dS3(t) → cos(t)/sqrt(cos(t)^2 + sin(t)^2)
n32(t) := -dx3(t)/dS3(t) → sin(t)/sqrt(cos(t)^2 + sin(t)^2)
_x1 := 0.293
_y1 := 0.2
_ε1 := 0.1
f(x, y) :=
    if (x - _x1)^2 + (y - _y1)^2 ≤ _ε1^2
        1
    else
        0
a(x, y) := 0
F1(x, y) := integral(integral(f(ξ, η)*E(x - ξ, y - η), η = 0 .. sqrt(1 - (1 - ξ)^2)), ξ = 0 .. x0) + integral(integral(f(ξ, η)*E(x - ξ, y - η), η = 0 .. 1 - ξ), ξ = x0 .. 1)
F21(x, y) := -integral((n11(t)*(x - x1(t)) + n12(t)*(y - y1(t)))*a(x1(t), y1(t))*dS1(t)/(2*π*((x - x1(t))^2 + (y - y1(t))^2)), t = t11 .. t12)
F22(x, y) := -integral((n21(t)*(x - x2(t)) + n22(t)*(y - y2(t)))*a(x2(t), y2(t))*dS2(t)/(2*π*((x - x2(t))^2 + (y - y2(t))^2)), t = t21 .. t22)
F23(x, y) := -integral((n31(t)*(x - x3(t)) + n32(t)*(y - y3(t)))*a(x3(t), y3(t))*dS3(t)/(2*π*((x - x3(t))^2 + (y - y3(t))^2)), t = t31 .. t32)
F2(x, y) := F21(x, y) + F22(x, y) + F23(x, y)
# 2. формирование базисных точек
δ := 0.02
ORIGIN := 1
M := 10
i := 1 .. M
N := 3*M
Bx[i] := -δ + (1 + 2*δ)*(i - 1)/M
By[i] := -δ
Bx[i + M] := 1 + δ - (i - 1)*(1 - x0 + δ)/M
By[i + M] := y2(Bx[i + M]) + sqrt(2)*δ
Bx[i + 2*M] := x0 - x0/M*(i - 1)
By[i + 2*M] := sqrt((1 + δ)^2 - (Bx[i + 2*M] - 1)^2)
# [plot: By vs Bx]
α(x, y, m) := ln((x - Bx[m])^2 + (y - By[m])^2)/(4*π)
i := 1 .. N
j := 1 .. N
g1[i, j] := integral(α(x1(t), y1(t), i)*α(x1(t), y1(t), j), t = t11 .. t12)
g2[i, j] := integral(α(x2(t), y2(t), i)*α(x2(t), y2(t), j), t = t21 .. t22)
g3[i, j] := integral(α(x3(t), y3(t), i)*α(x3(t), y3(t), j)*2^0.5, t = t31 .. t32)
g[i, j] := g1[i, j] + g2[i, j] + g3[i, j]
F(x, y) := F1(x, y) + F2(x, y)
b[i] := F1(Bx[i], By[i]) + F2(Bx[i], By[i])
c := lsolve(g, b)
transpose(c) = [0.0498551, 0.00119407, -0.0222886, -0.0627046, -0.0295232, 0.00070803, 0.00128375, 0.00198365, 0.00899954, -0.0508624, 0.120488, -0.0483825, -0.00202733, -0.00238771, 0.00392352, 0.0202773, 0.020142, 0.0288983, 0.0109391, 0.00527257, -0.00486822, -0.00134104, -0.00319154, -0.000116345, -0.00456646, -0.000501789, -0.00143067, -0.0077866, -0.00106811, -0.0234373]
pN(x, y) := sum(c[k]*α(x, y, k), k = 1 .. N)
I31(x, y) := integral(pN(x1(t), y1(t))*E(x - x1(t), y - y1(t))*dS1(t), t = t11 .. t12)
I32(x, y) := integral(pN(x2(t), y2(t))*E(x - x2(t), y - y2(t))*dS2(t), t = t21 .. t22)
I33(x, y) := integral(pN(x3(t), y3(t))*E(x - x3(t), y - y3(t))*dS3(t), t = t31 .. t32)
I3(x, y) := I31(x, y) + I32(x, y) + I33(x, y)
u(x, y) :=
    if (x ≥ 0) and (y ≥ 0) and ((x - 1)^2 + y^2 ≤ 1) and (y ≤ 1 - x)
        -I3(x, y) + F1(x, y) + F2(x, y)
    else
        0
# [contour plot: u]
