# Лабораторная работа 1.
a0 := 1.00
a1 := 0
a2 := 1
Y(K, L) := a0*K^a1*L^a2
α := 1
β := 2
Lmax(K, p) := a ← (2/(α*p*a2*K^a1))^(1/(a2 - 2))
f(K, p) := α*Y(K, Lmax(K, p)) - β*K
fs(K, p) := -p*(α*a1*a0*K^(a1 - 1)*Lmax(K, p)^a2 - β) + 2*K
y[0] := 1
f1(t1, v) := [y[0]; v[0]]
t1 := 0
t2 := 1
f2(t2, y) := y[1] - 0
v[0] := 1
fmax(t, y) := [f(y[0], y[1]); fs(y[0], y[1])]
a := sbval(y, t1, t2, fmax, f1, f2)
y[1] := a[0]
w := [y[0]; y[1]]
w[1] = -0.466446
N := 100
i := 0 .. N
z := rkfixed(w, 0, 10, N, fmax)
(z^2)[0] =  # error: Эта матрица должна быть квадратной.
Lmax((z^1)[0], (z^2)[0]) =  # error
Lmax((z^1)[10], (z^2)[10]) =  # error
(z^1)[10] =  # error
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