# Построение графиков полученного решения в MATHCAD
t := 0
xr0 := sqrt(5)
xr1 := (xr0/2) + 1
xr2 := (xr0/2) - 1
xr3 := e^xr0
xr4 := 1 + xr2
Kopt(t) := (xr2*e^(sqrt(5)*(t - 1)) + xr1*(1/e^(sqrt(5)*(t - 1))))/(xr1*xr3 + xr2*xr4)
t := 0 .. 1
Kopt(1) = 0.112088
Kopt(0) = 0.994017
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Lopt(t) := (e^(sqrt(5)*(t - 1)) - (1/e^(sqrt(5)*(t - 1))))/(2*(xr1*xr3 + xr2*xr4))
t := 0 .. 1
Lopt(0) = -0.231828
Lopt(1) = 0
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popt(t) := 2*Lopt(t)
t := 0 .. 1
popt(0) = -0.463655
popt(1) = 0
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