# Лаборатоная работа 3
umax(x, p) :=
    0 if p + 1 ≥ 0
    4 otherwise
f(x, p) := x - umax(x, p)
fs(x, p) := 1 - p
fmax(t, y) := [f(y[0], y[1]); fs(y[0], y[1])]
y[0] := 1
f1(t1, v) := [y[0]; v[0]]
t1 := 0
t2 := 4
v[0] := y[0]
f2(t2, y) := y[1] - 0
a := sbval(y, t1, t2, fmax, f1, f2)
y[1] := a[0]
w[:, 0] := [y[0]; y[1]]
N := 1000
i := 0 .. N
z := rkfixed(w, 0, t2, N, fmax)
z[:, 1][1000] = -155.798
z[:, 2][0] = -53.5982
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