# Лабораторная работа 4
umax(x, p) :=
    1 if p[1] + 3 ≥ 0
    0 otherwise
f(x, p) := [x[0] + x[1]; umax(x, p)]
fs(x, p) := [-p[0] + 1; -p[0] + 2]
fmax(t, y) := transpose([f([y[0]; y[1]], [y[2]; y[3]])[0], f([y[0]; y[1]], [y[2]; y[3]])[1], fs([y[0]; y[1]], [y[2]; y[3]])[0], fs([y[0]; y[1]], [y[2]; y[3]])[1]])
y[1] := 1
y[0] := 0.000
f1(t1, v) := transpose([y[0], y[1], v[0], v[1]])
v[0] := 0
v[1] := 0
t1 := 0
t2 := 3
f2(t2, y) := [y[2] + 1; y[3] - 0]
a := sbval(y, t1, t2, fmax, f1, f2)
y[2] := a[0]
y[3] := a[1]
i := 0 .. 20
z := rkfixed(y, t1, t2, 20, fmax)
z[20, 1] = 19.4802
z[20, 2] = 1.775
z[0, 3] = -39.1711
z[0, 4] = -41.1711
umax([z[0, 1]; z[0, 2]], [z[0, 3]; z[0, 4]]) = 0
umax([z[20, 1]; z[20, 2]], [z[20, 3]; z[20, 4]]) = 1
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