# Лаборатоная работа 6
umax(x, p) :=
    2 if (p - 1) ≥ 0
    (-2) otherwise
f(x, p) := 0.5*x + umax(x, p)
fs(x, p) := -0.5*p
fmax(t, y) := [f(y[0], y[1]); fs(y[0], y[1])]
y[0] := 1
f1(t1, v) := [y[0]; v[0]]
v[0] := 27
t1 := 0
t2 := 4
f2(t2, y) := y[1] - 3
a := sbval(y, t1, t2, fmax, f1, f2)
y[1] := a[0]
i := 0 .. 20
z := rkfixed(y, t1, t2, 20, fmax)
z[:, 2][0] = 22.1672
umax(z[:, 1][20], z[:, 2][20]) = 2
z[:, 1][20] = 32.9452
umax(z[:, 1][0], z[:, 2][0]) = 2
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