Y(K, L) := L
alpha := 1
beta := -3
Ham(K, L, P) := -2*(K + L^2) + P*(alpha*L - beta*K)
dHam(K, L, P) := d/dL(Ham(K, L, P)) → P - 4*L
Lmax(K, P) := P/4
dK(K, P) := alpha*Lmax(K, P) - beta*K → 3*K + P/4
dP(K, P) := d/dK(Ham(K, L, P)*(-1)) → 2 - 3*P
t1 := 0
t2 := 2
v := [1]
y[0] := 2
load(t1, v) := [y[0]; v[0]]
scope(t2, y) := y[1] - 2
Fmax(t, y) := [dK(y[0], y[1]); dP(y[0], y[1])]
a := sbval(v, t1, t2, Fmax, load, scope) = [538.572]
y[1] := a[0]
res := rkfixed(y, t1, t2, 100, Fmax)
i := 0 .. rows(res) - 1
# численное решение
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k1 := exp(6)*4/3 = 537.905
k2 := 2/3
time := 0, 0.2 .. 2
# аналитическое решение
Popt(t) := k1*exp(-3*t) + k2
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Lopt(t) := Popt(t)/4
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c := 1/6
k := exp(6)/3
Kopt(t) := (exp(6)/18 + (-exp(-6*t + 6)/18) + 2 - exp(-3*t)/18 + 1/18)*exp(3*t)
Kopt(0) = 2
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left(t) := d/dt(Kopt(t))
right(t) := Lopt(t) + 3*Kopt(t)
left(time) = [140.643; 170.653; 263.964; 455.188; 815.254; 1477.72; 2688.32; 4896.1; 8920; 16252.6; 29613.8]
right(time) = [140.643; 170.653; 263.964; 455.188; 815.254; 1477.72; 2688.32; 4896.1; 8920; 16252.6; 29613.8]
I(K, L) := integral(K(t) + L(t)^2, t = 0 .. 2)*2 - 2*K(2)
I(Kopt, Lopt) = -7134.98
