H(x1, x2, p1, p2, u) := x1 - u^2 + p1*x2 + p2*(x1 + u)
Hu(x1, x2, p1, p2, u) := d/du(H(x1, x2, p1, p2, u)) → p2 - 2*u
umax(x1, x2, p1, p2) := p2/2
dp1(p1, p2) := d/dx1(H(x1, x2, p1, p1, u)*(-1)) → -p1 - 1
dp2(p1, p2) := d/dx2(H(x1, x2, p1, p1, u)*(-1)) → -p1
t1 := 0
t2 := 10
y[0] := 1
y[1] := 1
v := [1; 1]
scope(t2, y) := [y[0]; y[1]]
load(t1, v) := [y[0]; y[1]; v[0]; v[1]]
Fmax(t, y) := [dp1(y[0], y[1]); dp2(y[0], y[1])] → [-y[0] - 1; -y[0]]
a := sbval(v, t1, t2, Fmax, load, scope)  # error: Эта переменная неопределена.
y[1] := a[0]  # error: Эта переменная неопределена.
res := rkfixed(y, t1, t2, 100, Fmax)  # error: Эта переменная неопределена.
i := 0 .. rows(res) - 1  # error: Эта переменная неопределена.
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