# Лабораторная работа 3
H(x, p, u) := -3*u + p*(x + u)
d/du(H(x, p, u)) → p - 3
umax(x, p) :=
    3 if p - 3 ≥ 0
    0 otherwise
# функции для системы
f(x, p) := x + umax(x, p)
fs(x, p) := -p
fmax(t, y) := [f(y[0], y[1]); fs(y[0], y[1])]
y[0] := 1
f1(t1, v) := [y[0]; v[0]]
t1 := 0
t2 := 4
v[0] := y[0]
f2(t2, y) := y[1] - 1
a := sbval(y, t1, t2, fmax, f1, f2)
y[1] := a[0]
w[:, 0] := [y[0]; y[1]]
N := 1000
i := 0 .. N
z := rkfixed(w, 0, t2, N, fmax)
z[:, 1][1000] = 209.386
z[:, 2][0] = 54.5982
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# численное решение
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4 - ln(3) = 2.90139
p(t) := exp(4)*exp(-t)
x(t) :=
    exp(t)*(4 - 9*exp(-4)) if t + ln(3) ≥ 4
    4*exp(t) - 3 otherwise
i := 0, 0.1 .. 4
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