# Лабораторная работа 4
H(x, p, u) := -u - x[1] - p[0]*x[1] + p[1]*(u - x[0])
d/du(H(x, p, u)) → p[1] - 1
umax(x, p) :=
    2 if p[1] - 1 ≥ 0
    0 otherwise
f(x, p) := [-x[1]; umax(x, p) - x[0]]
fs(x, p) := [p[1]; p[0] + 1]
fmax(t, y) := transpose([f([y[0]; y[1]], [y[2]; y[3]])[0], f([y[0]; y[1]], [y[2]; y[3]])[1], fs([y[0]; y[1]], [y[2]; y[3]])[0], fs([y[0]; y[1]], [y[2]; y[3]])[1]])
y[1] := 1
y[0] := 2
f1(t1, v) := transpose([y[0], y[1], v[0], v[1]])
v[0] := 0
v[1] := 0
t1 := 0
t2 := 1
f2(t2, y) := [y[2] - 0; y[3] + 1]
a := sbval(y, t1, t2, fmax, f1, f2)
y[2] := a[0]
y[3] := a[1]
i := 0 .. 20
z := rkfixed(y, t1, t2, 20, fmax)
z[20, 1] = 1.91096
z[20, 2] = -0.807322
z[0, 3] = 1.71828
z[0, 4] = -2.71828
umax([z[0, 1]; z[0, 2]], [z[0, 3]; z[0, 4]]) = 0
umax([z[20, 1]; z[20, 2]], [z[20, 3]; z[20, 4]]) = 0
# численное решение
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# аналитическое решение
p2(t) := -exp(1)*exp(-t)
p1(t) := -p2(t) - 1
c1 := -1/2
c2 := 3/2
x1(t) := -c1*exp(t) + c2*exp(-t)
x2(t) := c1*exp(t) + c2*exp(-t)
i := 0, 0.05 .. 1
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