# Лабораторная работа 5
# оптимальное управление
umax(x, p) := p/2
# уравнения для u и p
f(x, p) := umax(x, p)
fs(x, p) := 1
fmax(t, y) := [f(y[0], y[1]); fs(y[0], y[1])]
# начальные условия
y[0] := -1
f1(t1, v) := [y[0]; v[0]]
v[0] := -11
# интервал по времени
t1 := 0
t2 := 3
# условие на конец
f2(t2, y) := y[1] - 1
a := sbval(y, t1, t2, fmax, f1, f2)
y[1] := a[0]
i := 0 .. 20
z := rkfixed(y, t1, t2, 20, fmax)
z[:, 2][0] = -2
umax(z[:, 1][0], z[:, 2][0]) = -1
z[:, 1][20] = -1.75
umax(z[:, 1][20], z[:, 2][20]) = 0.5
# численное решение
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# аналитическое решение
p(t) := t - 2
u(t) := p(t)/2
x(t) := t^2/4 + (-1) - t
t := 0, 0.1 .. 3
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