# Лаборатоная работа 6
umax(x, p) :=
    0 if (p + 1) ≥ 0
    (-1) otherwise
f(x, p) := -x + umax(x, p)
fs(x, p) := p + 1
fmax(t, y) := [f(y[0], y[1]); fs(y[0], y[1])]
y[0] := 2
f1(t1, v) := [y[0]; v[0]]
v[0] := 25
t1 := 0
t2 := 2
f2(t2, y) := y[1] - 3
a := sbval(y, t1, t2, fmax, f1, f2)
y[1] := a[0]
i := 0 .. 20
z := rkfixed(y, t1, t2, 20, fmax)
z[:, 2][0] = -0.458659
umax(z[:, 1][20], z[:, 2][20]) = 0
z[:, 1][20] = 0.270671
umax(z[:, 1][0], z[:, 2][0]) = 0
# численное решение
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# аналитическое решение
x(t) := 2*exp(-t)
p(t) := 4*exp(t - 2) - 1
t := 0, 0.1 .. 2
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