"Начальные данные:"
u(x) := sqrt(1 - (x - 1)^2)
v(x) := sqrt(1 - x^2)
K := 100
ε := 0.2
a := 0
b := 1
H := 20
"Точка пересечения:"
x_0 := root(u(x) - v(x), x, a, b)
f_1(x) :=
    r ← 0
    if (x ≥ a) and (x ≤ x_0)
        r ← u(x)
    if (x > x_0) and (x ≤ b)
        r ← v(x)
    r
# [plot: f_1(x) vs x]
f_2(x) := sign(x - x_0)*f_1(x)
RandPoint(f) :=
    δ ← ε
    for i ∈ 0 .. (K + 1)
        r[i] ← f(a + (b - a)/(K + 1)*i) + rnd(ε) - rnd(δ)
    r
# [plot: f_2(x) vs x]
y := RandPoint(f_1) = [
    -0.0384109; 0.18731; 0.327762; 0.323219; 0.267458; 0.484625; 0.234985; 0.452904; 0.4688; 0.465335
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]
f_3(x, y) :=
    N1 ← trunc(x/(1/K))
    N2 ← N1 + 1
    g ← y[N1] + (x - N1/K)*(y[N2] - y[N1])/(N2 - N1)*K
    g
f_3(x) := f_3(x, y)
# [plot: f_1(x), f_3(x) vs x]
"Шаг:"
h := (b - a)/H
f_4(x, f) :=
    val ← 0
    if (x > 0) and (x ≤ 1)
        val ← f(h*trunc(x/h) + h*1/2)
    val
f_4(x) := f_4(x, f_1)
# [plot: f_4(x) vs x]
ORIGIN := 1
Posl(k) :=
    for i ∈ 1 .. k
        g[i] ← i
    g
"Натур. числа:"
"Норма разности:"
Metrik(f, g) :=
    val ← sqrt(integral(|f(x) - g(x)|^2, x = a .. b))
    val
"Скалярное произведение:"
Scalar(f, g) := integral(f(x)*g(x), x = a .. b)
ИНТЕРПОЛЯЦИОННЫЙ_ПОЛИНОМ
ORIGIN := 0
interpol(f, N, x) :=
    h ← (b - a)/N
    for i ∈ 0 .. N
        F[i] ← f(a + h*i)
        for j ∈ 0 .. N
            A[i, j] ← (a + h*i)^j
    α ← lsolve(A, F)
    sum(α[i]*x^i, i = 0 .. N)
ORIGIN := 1
"Последовательсноть погрешностей:"
PolyGrafic(f, k) :=
    for i ∈ 1 .. k
        interpolf(x) ← interpol(f, i, x)
        g[i] ← Metrik(interpolf, f)
    g
# [plot: f_1(x), interpol(f_1, 10, x) vs x]
apr := PolyGrafic(f_1, 20) = [0.645497; 0.0739327; 0.0788989; 0.0673227; 0.0478378; 0.0186399; 0.0226107; 0.0496155; 0.0236103; 0.0460973; 0.00932027; 0.132773; 0.0269634; 0.279936; 0.0272466; 0.737193; 0.0855819; 1.94864; 0.184803; 4.89406]  # disabled
# [plot: apr vs Posl(20)]
# [plot: f_2(x), interpol(f_2, 10, x) vs x]
apr := PolyGrafic(f_2, 20) = [0.645497; 0.645497; 0.353544; 0.333363; 0.417337; 0.291377; 0.545268; 0.248881; 1.12456; 0.290164; 2.64636; 0.428599; 7.05911; 0.942484; 19.9455; 2.29969; 59.1462; 6.1273; 184.718; 16.9868]  # disabled
# [plot: apr vs Posl(20)]
# [plot: f_3(x), interpol(f_3, 10, x) vs x]
apr := PolyGrafic(f_3, 20) = [0.572394; 0.112641; 0.0948975; 0.102983; 0.103548; 0.0971829; 0.142878; 0.0822167; 0.169811; 0.340923; 0.543742; 0.354828; 0.769039; 1.67154; 1.85002; 3.98023; 5.13022; 18.1349; 30.0887; 43.3526]  # disabled
# [plot: apr vs Posl(20)]
# [plot: f_4(x), interpol(f_4, 11, x) vs x]
apr := PolyGrafic(f_4, 20) = [0.645633; 0.0822786; 0.0862401; 0.0735866; 0.063844; 0.0398964; 0.0486893; 0.0545231; 0.0405203; 0.0498591; 0.0407071; 0.0607605; 0.170994; 0.609495; 0.253562; 0.53164; 0.557205; 1.87898; 0.184622; 0.394586]  # disabled
# [plot: apr vs Posl(20)]
ПРИБЛИЖЕНИЕ_МОНОМАМИ  # disabled
ORIGIN := 0
φ(x, k) := x^k
powerpol(f, n, x) :=
    for i ∈ 0 .. n
        φi(x) ← φ(x, i)
        F[i] ← Scalar(f, φi)
        for j ∈ 0 .. n
            φj(x) ← φ(x, j)
            A[i, j] ← Scalar(φi, φj)
    α ← lsolve(A, F)
    sum(α[i]*x^i, i = 0 .. n)  # disabled
ORIGIN := 1
"Последовательсноть погрешностей:"  # disabled
PowerGrafic(f, k) :=
    for i ∈ 1 .. k
        powerpolf(x) ← powerpol(f, i, x)
        g[i] ← Metrik(powerpolf, f)
    g  # disabled
# [plot: f_1(x), powerpol(f_1, 7, x) vs x]
apr := PowerGrafic(f_1, 20) = [0.198603; 0.0206442; 0.0206442; 0.01877; 0.01877; 0.00682848; 0.00682848; 0.00682303; 0.00682303; 0.00360352; 0.00360401; 0.00363416; 0.00359431; 0.00360315; 0.00353102; 0.00997576; 0.00322614; 0.00316196; 0.00328024; 0.00297548]  # disabled
# [plot: apr vs Posl(20)]
# [plot: f_2(x), powerpol(f_2, 11, x) vs x]
apr := PowerGrafic(f_2, 20) = [0.47581; 0.47581; 0.321221; 0.321221; 0.274021; 0.274021; 0.236267; 0.236267; 0.214017; 0.214017; 0.195226; 0.20149; 0.195311; 0.196636; 0.186128; 0.256909; 0.186213; 0.186996; 0.191018; 0.175948]  # disabled
# [plot: apr vs Posl(20)]
# [plot: f_3(x), powerpol(f_3, 3, x) vs x]
apr := PowerGrafic(f_3, 20) = [0.203377; 0.0639245; 0.0636363; 0.064101; 0.0647478; 0.0676625; 0.067237; 1.55609; 14.5814; 106.568; 748.936; 13359.9; 13473.6; 764.05; 1266.87; 5437.3; 5024.85; 1312.33; 14192.3; 10281.9]  # disabled
# [plot: apr vs Posl(20)]
# [plot: f_4(x), powerpol(f_4, 4, x) vs x]
apr := PowerGrafic(f_4, 20) = [0.193486; 0.0250938; 0.0249775; 0.0255708; 0.0350282; 0.154678; 0.388995; 1.84743; 40.624; 520.386; 4718.45; 89002.3; 87848.7; 5574.73; 1654.83; 23162.4; 4741.63; 4592.62; 6673.71; 847.671]  # disabled
# [plot: apr vs Posl(20)]
ОРТОГОНАЛЬНЫЕ_МНОГОЧЛЕНЫ
ORIGIN := 1
TOL := 10^-3
C(k, n) :=
    if k == n
        1
    else
        up ← product(i, i = k + 1 .. n)
        down ← product(i, i = 1 .. n - k)
        up/down
"Полиномы Лежандра:"
γ(x, n) :=
    xx ← 2*x - 1
    sqrt(2*n + 1)*1/2^n*sum(C(k, n)^2*(xx - 1)^(n - k)*(xx + 1)^k, k = 0 .. n)
0^0 = 1
"Проверка ортогональности:"
integral(γ(x, 3)*γ(x, 3), x = a .. b) = 1
γ(1, 4) = 3
# [plot: γ(x, 0), γ(x, 3) vs x]
# [plot: Leg(3, 2*x - 1) vs x]
"Ряд Фурье:"
ortopol(f, n, x) :=
    for i ∈ 1 .. n
        φi(x) ← γ(x, i - 1)
        α[i] ← Scalar(f, φi)/Scalar(φi, φi)
    sum(α[i]*γ(x, i - 1), i = 1 .. n)
"Последовательность погрешностей:"
OrtoGrafic(f, k) :=
    for i ∈ 1 .. k
        Ortopolf(x) ← ortopol(f, i, x)
        g[i] ← Metrik(Ortopolf, f)
    g
TOL := 10^-3
# [plot: f_1(x), ortopol(f_1, 7, x) vs x]
apr := OrtoGrafic(f_1, 10) = [0.198603; 0.198603; 0.0206442; 0.0206442; 0.01877; 0.01877; 0.00682848; 0.00682848; 0.00682304; 0.00682304]
# [plot: apr vs Posl(10)]
# [plot: f_2(x), ortopol(f_2, 14, x) vs x]
apr := OrtoGrafic(f_2, 15) = [0.645497; 0.47581; 0.47581; 0.321221; 0.321221; 0.274021; 0.274021; 0.236267; 0.236267; 0.214017; 0.214017; 0.195213; 0.195213; 0.181768; 0.181768]
# [plot: apr vs Posl(15)]
# [plot: f_3(x), ortopol(f_3, 3, x) vs x]
apr := OrtoGrafic(f_3, 5) = [0.203381; 0.203377; 0.0639246; 0.0636367; 0.0637888]
# [plot: apr vs Posl(5)]
# [plot: f_4(x), ortopol(f_4, 4, x) vs x]
apr := OrtoGrafic(f_4, 15) = [0.193486; 0.193486; 0.025032; 0.025032; 0.0250411; 0.0250411; 0.0232123; 0.0232123; 0.0232095; 0.0232095; 0.023271; 0.023271; 0.0216013; 0.0216013; 0.0214646]
# [plot: apr vs Posl(15)]
