"Начальные данные:"
u(x) := sqrt(1 - (x - 1)^2)
v(x) := sqrt(1 - x^2)
K := 100
ε := 0.2
a := 0
b := 1
H := 20
"Точка пересечения:"
x_0 := root(u(x) - v(x), x, a, b)
f_1(x) :=
    r ← 0
    if (x ≥ a) and (x ≤ x_0)
        r ← u(x)
    if (x > x_0) and (x ≤ b)
        r ← v(x)
    r
# [plot: f_1(x) vs x]
f_2(x) := sign(x - x_0)*f_1(x)
RandPoint(f) :=
    δ ← ε
    for i ∈ 0 .. (K + 1)
        r[i] ← f(a + (b - a)/(K + 1)*i) + rnd(ε) - rnd(δ)
    r
# [plot: f_2(x) vs x]
y := RandPoint(f_1) = [
    0.0637381; 0.0234887; 0.173431; 0.310589; 0.222537; 0.333115; 0.47686; 0.405809; 0.380125; 0.39311
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]
f_3(x, y) :=
    N1 ← trunc(x/(1/K))
    N2 ← N1 + 1
    g ← y[N1] + (x - N1/K)*(y[N2] - y[N1])/(N2 - N1)*K
    g
f_3(x) := f_3(x, y)
# [plot: f_1(x), f_3(x) vs x]
"Шаг:"
h := (b - a)/H
f_4(x, f) :=
    val ← 0
    if (x > 0) and (x ≤ 1)
        valuex ← h*trunc(x/h) + h*1/2
        val ← f(valuex)
    val
f_4(x) := f_4(x, f_1)
# [plot: f_4(x) vs x]
ORIGIN := 1
Posl(k) :=
    for i ∈ 1 .. k
        g[i] ← i
    g
"Натур. числа:"
"Норма разности:"
Metrik(f, g) :=
    val ← sqrt(integral(|f(x) - g(x)|^2, x = a .. b))
    val
"Скалярное произведение:"
Scalar(f, g) := integral(f(x)*g(x), x = a .. b)
ТРИГОНОМЕТРИЧЕСКИЕ_МНОГОЧЛЕНЫ
TOL := 10^-3
"Элементы триг. системы:"
t(x, k) :=
    l ← (b - a)/2
    if k == 1
        1/sqrt(2*l)
    else
        if k/2 - trunc(k/2) == 0
            cos((k/2)*x*π/l)/sqrt(l)
        else
            sin((k - 1)/2*x*π/l)/sqrt(l)
"Проверка на ортонормированность:"
integral(t(x, 2)*t(x, 13), x = a .. b) = -1.52701e-16
integral(t(x, 6)^2, x = a .. b) = 1
t(x, 1) → 1
t(x, 5) → sqrt(2)*sin(4*π*x)
t(x, 2) → sqrt(2)*cos(2*π*x)
t(x, 6) → sqrt(2)*cos(6*π*x)
t(x, 3) → sqrt(2)*sin(2*π*x)
t(x, 7) → sqrt(2)*sin(6*π*x)
t(x, 4) → sqrt(2)*cos(4*π*x)
t(x, 8) → sqrt(2)*cos(8*π*x)
trigpol(f, n, x) :=
    for i ∈ 1 .. n
        φi(x) ← t(x, i)
        α[i] ← Scalar(f, φi)
    sum(α[i]*t(x, i), i = 1 .. n)
"Последовательность погрешностей:"
TrigGrafic(f, k) :=
    for i ∈ 1 .. k
        polf(x) ← trigpol(f, i, x)
        g[i] ← Metrik(polf, f)
    g
# [plot: f_1(x), trigpol(f_1, 8, x) vs x]
apr := TrigGrafic(f_1, 20) = [0.198603; 0.0641614; 0.0641614; 0.046137; 0.046137; 0.0305522; 0.0305522; 0.0253368; 0.0253368; 0.0198813; 0.0198813; 0.0174261; 0.0174261; 0.0147015; 0.0147015; 0.0132691; 0.0132691; 0.011646; 0.011646; 0.0107072]
# [plot: apr vs Posl(20)]
# [plot: f_2(x), trigpol(f_2, 11, x) vs x]
apr := TrigGrafic(f_2, 20) = [0.645497; 0.645497; 0.295358; 0.295358; 0.260597; 0.260597; 0.204259; 0.204259; 0.18897; 0.18897; 0.164774; 0.164774; 0.155633; 0.155633; 0.141679; 0.141679; 0.13541; 0.13541; 0.126126; 0.126126]
# [plot: apr vs Posl(20)]
TOL := 10^-1
# [plot: f_3(x), trigpol(f_3, 6, x) vs x]
apr := TrigGrafic(f_3, 5) = [0.211777; 0.0892897; 0.0895269; 0.0752607; 0.0715464]
# [plot: apr vs Posl(5)]
# [plot: f_4(x), trigpol(f_4, 4, x) vs x]
apr := TrigGrafic(f_4, 10) = [0.193486; 0.0592522; 0.0592522; 0.0418495; 0.0418495; 0.0294143; 0.0294143; 0.0272302; 0.0272302; 0.0249849]
# [plot: apr vs Posl(10)]
СИСТЕМА_XААРА
ORIGIN := 1
TOL := 10^-3
"Фукнция Хаара k класса m:"
χ(x, k, m) :=
    val ← 0
    if (k/2^m ≤ x) and ((k + 1/2)/2^m > x)
        val ← sqrt(2^m)
    else
        if ((k + 1/2)/2^m ≤ x) and ((k + 1)/2^m > x)
            val ← -sqrt(2^m)
    val
χ(x, n) :=
    val ← 1
    if n ≥ 2
        m ← trunc(log(n - 1, 2))
        k ← n - 1 - 2^m
        val ← χ(x, k, m)
    val
"Проверка ортогональности:"
integral(χ(x, 5)*χ(x, 7), x = a .. b) = 0
"Ряд Фурье:"
xpol(f, n, x) :=
    for i ∈ 1 .. n
        φi(x) ← χ(x, i)
        α[i] ← Scalar(f, φi)/Scalar(φi, φi)
    sum(α[i]*χ(x, i), i = 1 .. n)
ORIGIN := 1
"Последовательность погрешностей:"
XGrafic(f, k) :=
    for i ∈ 1 .. k
        Ortopolf(x) ← xpol(f, i, x)
        g[i] ← Metrik(Ortopolf, f)
    g
# [plot: f_1(x), xpol(f_1, 10, x) vs x]
apr := XGrafic(f_1, 20) = [0.198603; 0.198603; 0.162798; 0.11646; 0.0978524; 0.0944973; 0.0911333; 0.0657072; 0.0565214; 0.054606; 0.0535025; 0.052825; 0.0524003; 0.0510889; 0.0487167; 0.0357745; 0.031188; 0.0302624; 0.029411; 0.0294827]
# [plot: apr vs Posl(20)]
# [plot: f_2(x), xpol(f_2, 11, x) vs x]
apr := XGrafic(f_2, 20) = [0.645497; 0.198603; 0.162798; 0.11646; 0.0978524; 0.0944973; 0.0911333; 0.0657072; 0.0565214; 0.054606; 0.0535025; 0.052825; 0.0524003; 0.0510889; 0.0487167; 0.0357745; 0.031188; 0.0302624; 0.029411; 0.0294827]
# [plot: apr vs Posl(20)]
TOL := 10^-1
# [plot: f_3(x), xpol(f_3, 5, x) vs x]
apr := XGrafic(f_3, 5)  # error: Результаты вычисления не сходятся в решение. Дополнительные сведения см. в справке.
# [plot: apr vs Posl(5)]
# [plot: f_4(x), xpol(f_4, 12, x) vs x]
apr := XGrafic(f_4, 10) = [0.193486; 0.193486; 0.15652; 0.109818; 0.0921708; 0.0889277; 0.085938; 0.0616805; 0.0561305; 0.052265]
# [plot: apr vs Posl(10)]
ПРИБЛИЖЕНИЕ_БАЗИСНЫМИ_ПОТЕНЦИЛАМИ
"Базисные точки и базисные потенциалы:"
i := 1 .. H  # disabled
baspol(f, n, x) :=
    N ← n
    h ← (b - a)/n
    for i ∈ 1 .. n
        ξ[i] ← h*i
        η[i] ← 1/20*(|sin(ξ[i])| + h)
    for i ∈ 1 .. n
        φi(x) ← ln(sqrt((x - ξ[i])^2 + η[i]^2))
        F[i] ← Scalar(f, φi)
        for j ∈ 1 .. n
            φj(x) ← ln(sqrt((x - ξ[j])^2 + η[j]^2))
            A[i, j] ← Scalar(φi, φj)
    α ← lsolve(A, F)
    sum(α[i]*ln(sqrt((x - ξ[i])^2 + η[i]^2)), i = 1 .. n)
ξ[i] := h*i  # disabled
η[i] := 1/20*(|sin(ξ[i])| + h)  # disabled
E(x, y, i) := ln(sqrt((x - ξ[i])^2 + (y - η[i])^2))  # disabled
baspol(f, n, x) :=
    for i ∈ 1 .. n
        φi(x) ← E(x, 0, i)
        F[i] ← Scalar(f, φi)
        for j ∈ 1 .. n
            φj(x) ← E(x, 0, j)
            A[i, j] ← Scalar(φi, φj)
    α ← lsolve(A, F)
    sum(α[i]*E(x, 0, i), i = 1 .. n)  # disabled
ORIGIN := 1
"Последовательсноть погрешностей:"
BasGrafic(f, k) :=
    for i ∈ 1 .. k
        baspolf(x) ← baspol(f, i, x)
        g[i] ← Metrik(baspolf, f)
    g
# [plot: f_1(x), baspol(f_1, 7, x) vs x]
apr := BasGrafic(f_1, 20) = [0.46392; 0.122347; 0.0797291; 0.0512194; 0.0477219; 0.0405945; 0.0393982; 0.0361461; 0.03506; 0.0330227; 0.0319849; 0.0304985; 0.0295325; 0.028367; 0.0274812; 0.0265553; 0.0256613; 0.0250935; 0.0244431; 0.051854]
# [plot: apr vs Posl(20)]
# [plot: f_2(x), baspol(f_2, 11, x) vs x]
apr := BasGrafic(f_2, 20) = [0.59536; 0.559909; 0.282618; 0.360222; 0.213501; 0.286383; 0.17875; 0.243736; 0.157142; 0.214897; 0.142275; 0.193704; 0.131375; 0.177389; 0.122942; 0.164408; 0.116191; 0.15353; 0.110606; 0.161708]
# [plot: apr vs Posl(20)]
# [plot: f_3(x), baspol(f_3, 6, x) vs x]
apr := BasGrafic(f_3, 10)  # error: Эта переменная не определена. Проверьте правильность установки обозначения.
# [plot: apr vs Posl(10)]
# [plot: f_4(x), baspol(f_4, 4, x) vs x]
apr := BasGrafic(f_4, 15) = [0.462015; 0.121372; 0.0773818; 0.0493174; 0.0454345; 0.0386645; 0.0388795; 0.0356717; 0.0341643; 0.0327681; 0.031278; 0.0304152; 0.0300414; 0.0297921; 0.0295567]
# [plot: apr vs Posl(15)]
