a := 0
b := 1
u(x) := x
v(x) := -x + 1
x_0 := root(u(x) - v(x), x, a, b)
f_1(x) :=
    r ← 0
    if (x ≥ a) and (x ≤ x_0)
        r ← u(x)
    if (x > x_0) and (x ≤ b)
        r ← v(x)
    r
# [plot: f_1(x) vs x]
f_2(x) := sign(x - x_0)*f_1(x)
K := 100
ε := 0.1
RandPoint(f) :=
    δ ← ε
    for i ∈ 0 .. (K + 1)
        r[i] ← f(a + (b - a)/(K + 1)*i) + rnd(ε) - rnd(δ)
    r
# [plot: f_2(x) vs x]
y := RandPoint(f_1) = [
    0.0234698; 0.0747719; 0.0604529; 0.0241128; 0.126547; -0.0027692; 0.102957; 0.10868; 0.105552; 0.0811157
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]
f_3(x, y) :=
    N1 ← trunc(x/(1/K))
    N2 ← N1 + 1
    g ← y[N1] + (x - N1/K)*(y[N2] - y[N1])/(N2 - N1)*K
    g
# [plot: f_1(x), f_3(x, y) vs x]
f_3(x) := f_3(x, y)
f_4(x, h, f) :=
    val ← 0
    if (x > 0) and (x ≤ 1)
        val ← f(h*trunc(x/h) + h*1/2)
    val
f_4(x) := f_4(x, 0.05, f_1)
# [plot: f_4(x) vs x]
Posl(k) :=
    for i ∈ 1 .. k
        g[i] ← i
    g
Metrik(f, g) :=
    val ← sqrt(integral(|f(x) - g(x)|^2, x = a .. b))
    val
Scalar(f, g) := integral(f(x)*g(x), x = a .. b)
ИНТЕРПОЛЯЦИОННЫЙ_ПОЛИНОМ
ORIGIN := 0
interpol(f, N, a, b, x) :=
    h ← (b - a)/N
    for i ∈ 0 .. N
        F[i] ← f(a + h*i)
        for j ∈ 0 .. N
            A[i, j] ← (a + h*i)^j
    α ← lsolve(A, F)
    sum(α[i]*x^i, i = 0 .. N)
ORIGIN := 1
PolyGrafic(f, k) :=
    for i ∈ 1 .. k
        interpolf(x) ← interpol(f, i, 0, 1, x)
        g[i] ← Metrik(interpolf, f)
    g
# [plot: f_1(x), interpol(f_1, 10, 0, 1, x) vs x]
# [plot: PolyGrafic(f_1, 20) vs Posl(20)]
PolyGrafic(f_1, 20) = [0.288675; 0.0912871; 0.0456435; 0.0464811; 0.0205; 0.0415189; 0.0134177; 0.0563072; 0.0123663; 0.100846; 0.0166308; 0.213089; 0.0294123; 0.50056; 0.0605568; 1.26716; 0.136958; 3.39111; 0.331429; 8.47759]
# [plot: PolyGrafic(f_2, 15) vs Posl(15)]
# [plot: f_2(x), interpol(f_2, 10, 0, 1, x) vs x]
PolyGrafic(f_2, 15) = [0.288675; 0.288675; 0.220254; 0.19854; 0.225971; 0.161885; 0.323347; 0.147239; 0.639173; 0.161614; 1.5311; 0.252112; 4.06427; 0.537791; 11.5072]
# [plot: f_3(x), interpol(f_3, 10, 0, 1, x) vs x]
# [plot: PolyGrafic(f_3, 20) vs Posl(20)]
PolyGrafic(f_3, 20) = [0.28027; 0.0882014; 0.06029; 0.0503871; 0.0519715; 0.0430327; 0.0658918; 0.0460671; 0.0785784; 0.237233; 0.268829; 0.306563; 0.35471; 0.546373; 0.864864; 2.74537; 2.31037; 7.08802; 14.3875; 17.0045]
# [plot: f_4(x), interpol(f_4, 11, 0, 1, x) vs x]
# [plot: PolyGrafic(f_4, 20) vs Posl(20)]
PolyGrafic(f_4, 20) = [0.288369; 0.0769648; 0.0489163; 0.0418313; 0.0306294; 0.0427415; 0.0196715; 0.0422504; 0.0201478; 0.059943; 0.0224984; 0.0476994; 0.167464; 0.739562; 0.239402; 0.87907; 0.642116; 3.05462; 0.317987; 0.63978]
Posl(k) :=
    for i ∈ 1 .. k
        g[i] ← i
    g
Metrik(f, g) :=
    val ← sqrt(integral(|f(x) - g(x)|^2, x = a .. b))
    val
Scalar(f, g) := integral(f(x)*g(x), x = a .. b)
ПОЛИНОМ_ПРИБЛИЖЕНИЯ
ORIGIN := 0
φ(x, k) := x^k
powerpol(f, n, a, b, x) :=
    for i ∈ 0 .. n
        φi(x) ← φ(x, i)
        F[i] ← Scalar(f, φi)
        for j ∈ 0 .. n
            φj(x) ← φ(x, j)
            A[i, j] ← Scalar(φi, φj)
    α ← lsolve(A, F)
    sum(α[i]*x^i, i = 0 .. n)
PowerGrafic(f, k) :=
    for i ∈ 1 .. k
        powerpolf(x) ← powerpol(f, i, 0, 1, x)
        g[i] ← Metrik(powerpolf, f)
    g
# [plot: f_1(x), powerpol(f_1, 7, 0, 1, x) vs x]
# [plot: PowerGrafic(f_1, 20) vs Posl(20)]
PowerGrafic(f_1, 20) = [0; 0.144338; 0.0360844; 0.0360844; 0.0180422; 0.0180422; 0.0112764; 0.0112764; 0.181495; 2.90878; 24.5577; 141.696; 1757.38; 1395.69; 214.477; 131.611; 359.231; 371.568; 83.2405; 108.42; 220.228]
# [plot: PowerGrafic(f_2, 15) vs Posl(15)]
# [plot: f_2(x), powerpol(f_2, 11, 0, 1, x) vs x]
PowerGrafic(f_2, 15) = [0; 0.25; 0.25; 0.1875; 0.1875; 0.15625; 0.15625; 0.136719; 0.136719; 0.123047; 0.123047; 0.1128; 90.2589; 266.509; 81.1543; 40.0757]
# [plot: PowerGrafic(f_3, 10) vs Posl(10)]
# [plot: f_3(x), powerpol(f_3, 3, 0, 1, x) vs x]
PowerGrafic(f_3, 10) =  # error: Эта переменная не определена. Проверьте правильность установки обозначения.
# [plot: f_4(x), powerpol(f_4, 4, 0, 1, x) vs x]
# [plot: PowerGrafic(f_4, 20) vs Posl(20)]
PowerGrafic(f_4, 20) =  # error
ОРТОГОНАЛЬНЫЕ_МНОГОЧЛЕНЫ
Posl(k) :=
    for i ∈ 1 .. k
        g[i] ← i
    g
Metrik(f, g) :=
    val ← sqrt(integral(|f(x) - g(x)|^2, x = a .. b))
    val
Scalar(f, g) := integral(f(x)*g(x), x = a .. b)
ORIGIN := 1
γ(x, k) :=
    if k == 1
        val ← 1
    if k == 2
        val ← x
    if k > 2
        val ← (2*k + 1)/(k + 1)*x*γ(x, k - 1) - k/(k + 1)*γ(x, k - 2)
    val
C(k, n) :=
    if k == n
        1
    else
        up ← product(i, i = k + 1 .. n)
        down ← product(i, i = 1 .. n - k)
        up/down
γ(x, n) := 1/2^n*sum(C(k, n)^2*(x - 1)^(n - k)*(x + 1)^k, k = 0 .. n)
γ(x, n) :=
    x ← 2*x - 1
    1/2^n*sum(C(k, n)^2*(x - 1)^(n - k)*(x + 1)^k, k = 0 .. n)
ortopol(f, n, a, b, x) :=
    for i ∈ 1 .. n
        φi(x) ← γ(x, i)
        α[i] ← Scalar(f, φi)/Scalar(φi, φi)
    sum(α[i]*γ(x, i), i = 1 .. n)
OrtoGrafic(f, k) :=
    for i ∈ 1 .. k
        Ortopolf(x) ← ortopol(f, i, 0, 1, x)
        g[i] ← Metrik(Ortopolf, f)
    g
# [plot: f_1(x), ortopol(f_1, 7, 0, 1, x) vs x]
# [plot: OrtoGrafic(f_1, 20) vs Posl(20)]
OrtoGrafic(f_1, 20) =  # error
# [plot: OrtoGrafic(f_2, 15) vs Posl(15)]
# [plot: f_2(x), ortopol(f_2, 11, 0, 1, x) vs x]
OrtoGrafic(f_2, 15) =  # error
# [plot: OrtoGrafic(f_3, 10) vs Posl(10)]
# [plot: f_3(x), ortopol(f_3, 10, 0, 1, x) vs x]
OrtoGrafic(f_3, 10) =  # error
# [plot: f_4(x), ortopol(f_4, 4, 0, 1, x) vs x]
# [plot: OrtoGrafic(f_4, 20) vs Posl(20)]
OrtoGrafic(f_4, 20) =  # error: Результаты вычисления не сходятся в решение. Дополнительные сведения см. в справке.; disabled
ТРИГОНОМЕТРИЧЕСКИЕ_МНОГОЧЛЕНЫ
ORIGIN := 1
π := 3.1416
t(x, k) :=
    x ← 2*x*π - π
    if k == 1
        1/sqrt(2*π)
    else
        if trunc(k/2) == 0
            cos((k/2)*x)/sqrt(π)
        else
            sin((k - 1)/2*x)/sqrt(π)
trigpol(f, n, a, b, x) :=
    for i ∈ 1 .. n
        φi(x) ← t(x, i)
        α[i] ← Scalar(f, φi)/Scalar(φi, φi)
    sum(α[i]*γ(x, i), i = 1 .. n)
TrigGrafic(f, k) :=
    for i ∈ 1 .. k
        Ortopolf(x) ← trigpol(f, i, 0, 1, x)
        g[i] ← Metrik(Ortopolf, f)
    g
# [plot: f_1(x), trigpol(f_1, 7, 0, 1, x) vs x]
# [plot: TrigGrafic(f_1, 20) vs Posl(20)]
TrigGrafic(f_1, 20) =  # error
# [plot: TrigGrafic(f_2, 15) vs Posl(15)]
# [plot: f_2(x), trigpol(f_2, 11, 0, 1, x) vs x]
TrigGrafic(f_2, 15) =  # error
# [plot: TrigGrafic(f_3, 10) vs Posl(10)]
# [plot: f_3(x), trigpol(f_3, 3, 0, 1, x) vs x]
TrigGrafic(f_3, 10) =  # error
# [plot: f_4(x), trigpol(f_4, 4, 0, 1, x) vs x]
# [plot: TrigGrafic(f_4, 20) vs Posl(20)]
TrigGrafic(f_4, 20) =  # error
