a := 0
b := 1
u(x) := x
v(x) := -x + 1
x_0 := root(u(x) - v(x), x, a, b)
f_1(x) :=
    r ← 0
    if (x ≥ a) and (x ≤ x_0)
        r ← u(x)
    if (x > x_0) and (x ≤ b)
        r ← v(x)
    r
# [plot: f_1(x) vs x]
f_2(x) := sign(x - x_0)*f_1(x)
K := 100
ε := 0.1
RandPoint(f) :=
    δ ← ε
    for i ∈ 0 .. (K + 1)
        r[i] ← f(a + (b - a)/(K + 1)*i) + rnd(ε) - rnd(δ)
    r
# [plot: f_2(x) vs x]
y := RandPoint(f_1) = [
    0.0234698; 0.0747719; 0.0604529; 0.0241128; 0.126547; -0.0027692; 0.102957; 0.10868; 0.105552; 0.0811157
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]
f_3(x, y) :=
    N1 ← trunc(x/(1/K))
    N2 ← N1 + 1
    g ← y[N1] + (x - N1/K)*(y[N2] - y[N1])/(N2 - N1)*K
    g
# [plot: f_1(x), f_3(x, y) vs x]
f_3(x) := f_3(x, y)
f_4(x, h, f) :=
    val ← 0
    if (x > 0) and (x ≤ 1)
        val ← f(h*trunc(x/h) + h*1/2)
    val
f_4(x) := f_4(x, 0.05, f_1)
# [plot: f_4(x) vs x]
Posl(k) :=
    for i ∈ 1 .. k
        g[i] ← i
    g
Metrik(f, g) :=
    val ← sqrt(integral(|f(x) - g(x)|^2, x = a .. b))
    val
Scalar(f, g) := integral(f(x)*g(x), x = a .. b)
ИНТЕРПОЛЯЦИОННЫЙ_ПОЛИНОМ
ORIGIN := 0
interpol(f, N, a, b, x) :=
    h ← (b - a)/N
    for i ∈ 0 .. N
        F[i] ← f(a + h*i)
        for j ∈ 0 .. N
            A[i, j] ← (a + h*i)^j
    α ← lsolve(A, F)
    sum(α[i]*x^i, i = 0 .. N)
ORIGIN := 1
PolyGrafic(f, k) :=
    for i ∈ 1 .. k
        interpolf(x) ← interpol(f, i, 0, 1, x)
        g[i] ← Metrik(interpolf, f)
    g
# [plot: f_1(x), interpol(f_1, 10, 0, 1, x) vs x]
# [plot: PolyGrafic(f_1, 20) vs Posl(20)]
PolyGrafic(f_1, 20) = [0.288675; 0.0912871; 0.0456435; 0.0464811; 0.0205; 0.0415189; 0.0134177; 0.0563072; 0.0123663; 0.100846; 0.0166308; 0.213089; 0.0294123; 0.50056; 0.0605568; 1.26716; 0.136958; 3.39111; 0.331429; 8.47759]
# [plot: PolyGrafic(f_2, 15) vs Posl(15)]
# [plot: f_2(x), interpol(f_2, 10, 0, 1, x) vs x]
PolyGrafic(f_2, 15) = [0.288675; 0.288675; 0.220254; 0.19854; 0.225971; 0.161885; 0.323347; 0.147239; 0.639173; 0.161614; 1.5311; 0.252112; 4.06427; 0.537791; 11.5072]
# [plot: f_3(x), interpol(f_3, 10, 0, 1, x) vs x]
# [plot: PolyGrafic(f_3, 20) vs Posl(20)]
PolyGrafic(f_3, 20) = [0.28027; 0.0882014; 0.06029; 0.0503871; 0.0519715; 0.0430327; 0.0658918; 0.0460671; 0.0785784; 0.237233; 0.268829; 0.306563; 0.35471; 0.546373; 0.864864; 2.74537; 2.31037; 7.08802; 14.3875; 17.0045]
# [plot: f_4(x), interpol(f_4, 11, 0, 1, x) vs x]
# [plot: PolyGrafic(f_4, 20) vs Posl(20)]
PolyGrafic(f_4, 20) = [0.288369; 0.0769648; 0.0489163; 0.0418313; 0.0306294; 0.0427415; 0.0196715; 0.0422504; 0.0201478; 0.059943; 0.0224984; 0.0476994; 0.167464; 0.739562; 0.239402; 0.87907; 0.642116; 3.05462; 0.317987; 0.63978]
