a := 0
b := 1
u(x) := x
v(x) := -x + 1
x_0 := root(u(x) - v(x), x, a, b)
f_1(x) :=
    r ← 0
    if (x ≥ a) and (x ≤ x_0)
        r ← u(x)
    if (x > x_0) and (x ≤ b)
        r ← v(x)
    r
# [plot: f_1(x) vs x]
f_2(x) := sign(x - x_0)*f_1(x)
K := 100
ε := 0.1
RandPoint(f) :=
    δ ← ε
    for i ∈ 0 .. (K + 1)
        r[i] ← f(a + (b - a)/(K + 1)*i) + rnd(ε) - rnd(δ)
    r
# [plot: f_2(x) vs x]
y := RandPoint(f_1) = [
    0.0234698; 0.0747719; 0.0604529; 0.0241128; 0.126547; -0.0027692; 0.102957; 0.10868; 0.105552; 0.0811157
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]
f_3(x, y) :=
    N1 ← trunc(x/(1/K))
    N2 ← N1 + 1
    g ← y[N1] + (x - N1/K)*(y[N2] - y[N1])/(N2 - N1)*K
    g
# [plot: f_1(x), f_3(x, y) vs x]
f_3(x) := f_3(x, y)
f_4(x, h, f) :=
    val ← 0
    if (x > 0) and (x ≤ 1)
        val ← f(h*trunc(x/h) + h*1/2)
    val
f_4(x) := f_4(x, 0.05, f_1)
# [plot: f_4(x) vs x]
Posl(k) :=
    for i ∈ 1 .. k
        g[i] ← i
    g
Metrik(f, g) :=
    val ← sqrt(integral(|f(x) - g(x)|^2, x = a .. b))
    val
Scalar(f, g) := integral(f(x)*g(x), x = a .. b)
