СЕМЕСТРОВОЕ_1
DX := [-12; -12; -11; -11; -8; -8; -11; -7; -7]
DY := [0; 2; 2; 5; 5; 2; 2; 2; 0]
IX := [-5; -5; -1; -1]
IY := [5; 0; 5; 0]
MX := [1; 1; 4; 7; 7]
MY := [0; 5; 2; 5; 0]
AX := [9; 10; 11; 12; 10; 12; 13]
AY := [0; 2; 5; 2; 2; 2; 0]
# [plot: DY, IY, MY, AY vs DX, IX, MX, AX]
P := [-16; -16 + 4i; -13 + 4i; -13; -14; -14 + 3i; -15 + 3i; -15; -16]
A1 := [-11; -9 + 4i; -7; -8; -9 + 1i; -10; -11]
A2 := [-8.5 + 1.5i; -9 + 3i; -9.5 + 1.5i; -8.5 + 1.5i]
S := [-5; -5 + 4i; -2 + 4i; -2 + 3i; -4 + 3i; -4 + 1i; -2 + 1i; -2; -4]
M1 := [0; 4i; 1 + 4i; 1 + 2i; 3 + 2i; 3; 0]
M2 := [1 + 1.5i; 2 + 1.5i; 2 + 0.5i; 1 + 0.5i; 1 + 1.5i]
K := [5; 5 + 4i; 6 + 4i; 6 + 2i; 7 + 4i; 8 + 4i; 7 + 2i; 8; 7; 6 + 1i; 6; 5]
O1 := [10; 10 + 4i; 13 + 4i; 13; 10]
O2 := [11 + 1i; 11 + 3i; 12 + 3i; 12 + 1i; 11 + 1i]
# [plot: Im(P), Im(A1), Im(A2), Im(S), Im(M1), Im(M2), Im(K), Im(O1), Im(O2) vs Re(P), Re(A1), Re(A2), Re(S), Re(M1), Re(M2), Re(K), Re(O1), Re(O2)]
Powo(Z, φ) := (Re(Z)*cos(φ) - Im(Z)*sin(φ)) + (Re(Z)*cos(φ) + Im(Z)*sin(φ))*1i
# [plot: Im(Powo(P, π/3)), Im(Powo(A1, π/3)), Im(Powo(A2, π/3)), Im(Powo(S, π/3)), Im(Powo(M1, π/3)), Im(Powo(M2, π/3)), Im(Powo(K, π/3)), Im(Powo(O1, π/3)), Im(Powo(O2, π/3)) vs Re(Powo(P, π/3)), Re(Powo(A1, π/3)), Re(Powo(A2, π/3)), Re(Powo(S, π/3)), Re(Powo(M1, π/3)), Re(Powo(M2, π/3)), Re(Powo(K, π/3)), Re(Powo(O1, π/3)), Re(Powo(O2, π/3))]
Powo1(Z, c) := Z + c
# [plot: Powo1(DY, -1/2), Powo1(IY, -2), Powo1(MY, 2), Powo1(AY, -3) vs Powo1(DX, -1/2), Powo1(IX, 0), Powo1(MX, 1), Powo1(AX, 0)]
# [plot: Im(Powo1(P, π/3 + 2i)), Im(Powo1(A1, π/3)), Im(Powo1(A2, π/3)), Im(Powo1(S, π/3)), Im(Powo1(M1, π/3)), Im(Powo1(M2, π/3)), Im(Powo1(K, π/3 + 1i)), Im(Powo1(O1, π/3)), Im(Powo1(O2, π/3)) vs Re(Powo1(P, π/3)), Re(Powo1(A1, π/3)), Re(Powo1(A2, π/3)), Re(Powo1(S, π/3)), Re(Powo1(M1, π/3)), Re(Powo1(M2, π/3)), Re(Powo1(K, π/3 + 1i)), Re(Powo1(O1, π/3)), Re(Powo1(O2, π/3))]
Powo2(Z, c) := Z*c
# [plot: Im(Powo2(P, π/4)), Im(Powo2(A1, π/5)), Im(Powo2(A2, π/5)), Im(Powo2(S, π/7)), Im(Powo2(M1, π/3)), Im(Powo2(M2, π/3)), Im(Powo2(K, π/3)), Im(Powo2(O1, π/3)), Im(Powo2(O2, π/3)) vs Re(Powo2(P, π/4)), Re(Powo2(A1, π/5)), Re(Powo2(A2, π/5)), Re(Powo2(S, π/7)), Re(Powo2(M1, π/3)), Re(Powo2(M2, π/3)), Re(Powo2(K, π/3)), Re(Powo2(O1, π/3)), Re(Powo2(O2, π/3))]
Sum(Z, K) := Z + K
Del(Z, K) := Z/K
Power(Z, K) := Z*K
# [plot: Im(Sum(O1, O2)), Im(Del(O1, O2)), Im(Power(A1, M1)), Im(Sum(P, S)) vs Re(Sum(O1, O2)), Re(Del(O1, O2)), Re(Power(A1, M1)), Re(Sum(P, S))]
СЕМЕСТРОВОЕ_2_В12
div(n, m) := (n - mod(n, m))/m
k0 := 0
k1 := 0.316 - 0.05i
k2 := 0.476 + 0.227i
k3 := 0.5 + 0.546i
k4 := 0.524 + 0.227i
k5 := 0.684 - 0.05i
k6 := 1
Frk(z0, α, l, k, m) :=
    z[0] ← z0
    for i ∈ 0 .. m^k - 1
        for j ∈ 0 .. k - 1
            t[j] ← mod(div(i, m^j), m)
        φ ← sum(α[t[j]], j = 0 .. k - 1)
        z[i + 1] ← z[i] + l^k*e^(1i*φ)
    z
o := [
    atan((Im(k1) - Im(k0))/(Re(k1) - Re(k0)));
    atan((Im(k2) - Im(k1))/(Re(k2) - Re(k1)));
    atan((Im(k3) - Im(k2))/(Re(k3) - Re(k2)));
    atan((Im(k4) - Im(k3))/(Re(k4) - Re(k3)));
    atan((Im(k5) - Im(k4))/(Re(k5) - Re(k4)));
    atan((Im(k6) - Im(k5))/(Re(k6) - Re(k5)))
]
z := Frk(0, o, 0.32, 2, 6)
# [plot: Im(z) vs Re(z)]
СЕМЕСТРОВОЕ_3
ORIGIN := 1
TOL := 10^-3
CTOL := 10^-3
k1 := 0
k2 := 0.316 - 0.05i
zp := [k1; k2]
n := 2
Bper := 1
Bodn := (|k2 - k1|/2)^2
f(z) := product(|z - zp[i]|, i = 1 .. n) - Bodn
u := sqrt(1.4831)
t := root(f(u), u, Re(k1) - 9, Re(k2) + 9) → -0.0663590426332
x := t[last(t)]  # error: Значение должно быть вектором.
x := t
x = -0.066359
Razb(z_0, ε, N) :=
    for i ∈ 1 .. N
        Rz[i] ← ε*(cos(2*π*i/N) + 1i*sin(2*π*i/N)) + z_0
    Rz
A := Razb(-1, 3, 100)
InRad(z_0, ε, z) := |z - z_0| ≤ ε
CountWay(z, ε, N) :=
    Rz ← Razb(z, ε, N)
    k ← 0
    for i ∈ 2 .. N - 1
        if (|f(Rz[i])| < |f(Rz[i - 1])|) and (|f(Rz[i])| < |f(Rz[i + 1])|)
            k ← k + 1
            way[k] ← Rz[i]
    if (|f(Rz[1])| < |f(Rz[2])|) and (|f(Rz[1])| < |f(Rz[N])|)
        k ← k + 1
        way[k] ← Rz[1]
    if (|f(Rz[N])| < |f(Rz[1])|) and (|f(Rz[N])| < |f(Rz[N - 1])|)
        k ← k + 1
        way[k] ← Rz[N]
    [z; way; k]
SelectWay(M) :=
    k ← 1
    if M[3] > 1
        for i ∈ 2 .. M[3]
            if |f(M[2][i])| < f(M[2][k])
                k ← i
    k
Isk(M, k) :=
    if k ≠ 1
        for i ∈ 1 .. k - 1
            way_r[i] ← M[2][i]
    if k ≠ M[3]
        for i ∈ k + 1 .. M[3]
            way_r[i - 1] ← M[2][i]
    [M[1]; way_r; M[3] - 1]
Pastway(M, zp, ξ) :=
    k ← 0
    if M[3] > 0
        t ← 1
        while (k == 0) and (t ≤ M[3])
            if |zp - M[2][t]| < ξ
                k ← t
            t ← t + 1
    k
IskPastway(M, zp, ξ) :=
    c ← Pastway(M, zp, ξ)
    while (c ≠ 0)
        M ← Isk(M, c)
        c ← Pastway(M, zp, ξ)
    M
MainProg(z0, ξ, N) :=
    T[1] ← z0
    M ← CountWay(z0, ξ, N)
    k ← SelectWay(M)
    T[2] ← M[2][2]
    t ← 2
    flag ← 1
    while flag
        M ← CountWay(T[t], ξ, N)
        M ← IskPastway(M, T[t - 1], ξ)
        k ← SelectWay(M)
        t ← t + 1
        T[t] ← M[2][k]
        flag ← |T[t] - T[1]| > ξ
    T
T := MainProg(x, 0.001, 1000)
# [plot: Im(T) vs Re(T)]
BB := Bodn
f(u, BB) := product(|u - zp[i]|, i = 1 .. n) - BB
u := sqrt(1.4831)
y := root(f(u, BB), u, Re(k1) - 1, Re(k2) + 1) → -0.0663590426332
CountWay(z, ε, N, B) :=
    Rz ← Razb(z, ε, N)
    k ← 0
    for i ∈ 2 .. N - 1
        if (|f(Rz[i], B)| < |f(Rz[i - 1], B)|) and (|f(Rz[i], B)| < |f(Rz[i + 1], B)|)
            k ← k + 1
            way[k] ← Rz[i]
    if (|f(Rz[1], B)| < |f(Rz[2], B)|) and (|f(Rz[1], B)| < |f(Rz[N], B)|)
        k ← k + 1
        way[k] ← Rz[1]
    if (|f(Rz[N], B)| < |f(Rz[1], B)|) and (|f(Rz[N], B)| < |f(Rz[N - 1], B)|)
        k ← k + 1
        way[k] ← Rz[N]
    [z; way; k]
x := y[last(y)]  # error: Значение должно быть вектором.
inf :=
    M ← CountWay(x, 0.001, 100, BB)
    while M[3] ≤ 1
        BB ← BB - |BB/1000000000000000000000|
        M ← CountWay(x, 0.001, 100, BB)
    BB  # error: Эта переменная не определена. Проверьте правильность установки обозначения.
СЕМЕСТРОВОЕ_4
z1 := 0
z2 := 0.316 - 0.05i
z3 := 0.476 + 0.227i
w1 := 0.5 + 0.546i
w2 := 0.524 + 0.227i
w3 := 0.684 - 0.05i
Wl(z) := (w1 - w2*((z - z1)*(z3 - z2)*(w3 - w1)/((z - z2)*(z3 - z1)*(w3 - w2))))/(1 - ((z - z1)*(z3 - z2)*(w3 - w1)/((z - z2)*(z3 - z1)*(w3 - w2))))
# [plot: Im(Wl(T)), Im(Wl(z)) vs Re(Wl(T)), Re(Wl(z))]
СЕМЕСТРОВОЕ_5
ORIGIN := 0
N := 1000
просто_кривая_Безье
Biz(M, N) :=
    for i ∈ 0 .. N - 1
        k ← i/(N - 1)
        F ← M
        for j ∈ rows(M) - 2 .. 0
            for l ∈ 0 .. j
                F[l] ← k*(F[l + 1] - F[l]) + F[l]
        Z[i] ← F[0]
    Z
B(Z, K) :=
    K ← rows(Z) - 1
    for i ∈ 0 .. N
        t_i ← 1/N*i
        B[i] ← sum((product(a, a = K - n + 1 .. K)/product(b, b = 1 .. n + 1)*(n + 1)*(1 - t_i)^(K - n)*t_i^n)*Z[n], n = 0 .. K)
    B
Более_точная_кривая
AV(z1, z2) := (z1 + z2)/2
SB(M, N, l) :=
    t ← 0
    Z[0] ← ln ← M[0]
    while rows(M) - t ≥ l
        B[0] ← ln
        for i ∈ 1 .. l - 2
            B[i] ← M[t + i]
        t ← t + l - 2
        B[l - 1] ← ln ← AV(M[t], M[t + 1])
        Zn ← Biz(B, N)
        Z ← stack(Z, Zn)
    Bl[0] ← ln
    for i ∈ 1 .. rows(M) - t - 1
        Bl[i] ← M[t + i]
    Zn ← Biz(Bl, N)
    Z ← stack(Z, Zn)
    Z
Молдова
MO := [
    6 + 2i;
    9 - 1i;
    10 - 5i;
    8 - 6i;
    2 - 6i;
    0 - 9i;
    -2 - 12i;
    -5 - 15i;
    -9 - 16i;
    -8 - 11i;
    -7 - 6i;
    -8;
    -9 + 6i;
    -10 + 34i;
    -1 + 28i;
    5 + 6i;
    6 + 2i
]
MOB := SB(MO, N, 3)
# [plot: Im(MO), Im(MOB) vs Re(MO), Re(MOB)]
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