_кривые_Безье_
Z := [
    0;
    1 + 1i;
    2 + 2i;
    5;
    7 + 10i;
    8 - 5i;
    10 - 7i;
    11 - 1i;
    12 - 10i;
    10 - 15i;
    8 - 10i;
    6 - 8i;
    4 - 2i;
    0
]
N := 1000
B(Z, K) :=
    K ← rows(Z) - 1
    for i ∈ 0 .. N
        t_i ← 1/N*i
        B[i] ← sum((product(a, a = K - n + 1 .. K)/product(b, b = 1 .. n + 1)*(n + 1)*(1 - t_i)^(K - n)*t_i^n)*Z[n], n = 0 .. K)
    B
H := B(Z, K)
# [plot: Im(H), Im(Z) vs Re(H), Re(Z)]
Amer := [70i; 2 + 65i; 4 + 60i; 6 + 50i; 6 + 47i; 5.5 + 45i; 7 + 35i; 7.5 + 39i; 8 + 33i; 10 + 7i]
A := [0; 1 + 2i; 2; 3 + 2i; 4; 5 + 2i; 6; 7 + 2i; 8]
Al := B(A, K)
# [plot: Im(Al), Im(A) vs Re(Al), Re(A)]
