div(n, m) := (n - mod(n, m))/m
α := [0; π/3; -π/3; 0]
Frk(z0, α, l, k, m) :=
    z[0] ← z0
    for i ∈ 0 .. m^k - 1
        for j ∈ 0 .. k - 1
            t[j] ← mod(div(i, m^j), m)
        φ ← sum(α[t[j]], j = 0 .. k - 1)
        z[i + 1] ← z[i] + l^k*e^(1i*φ)
    z
z := Frk(0, α, 1/3, 3, 4)
# [plot: Im(z) vs Re(z)]
γ := [0; 2*π/3; 0; -2*π/3; 0]
z2 := Frk(0, γ, 1/3, 5, 5)
# [plot: Im(z2) vs Re(z2)]
W(z) := (z - 1i)/(z + 1i)
w1 := W(z)
# [plot: Im(w1) vs Re(w1)]
