N := 1000
просто_кривая_Безье
Biz(M, N) :=
    for i ∈ 0 .. N - 1
        k ← i/(N - 1)
        F ← M
        for j ∈ rows(M) - 2 .. 0
            for l ∈ 0 .. j
                F[l] ← k*(F[l + 1] - F[l]) + F[l]
        Z[i] ← F[0]
    Z
B(Z, K) :=
    K ← rows(Z) - 1
    for i ∈ 0 .. N
        t_i ← 1/N*i
        B[i] ← sum((product(a, a = K - n + 1 .. K)/product(b, b = 1 .. n + 1)*(n + 1)*(1 - t_i)^(K - n)*t_i^n)*Z[n], n = 0 .. K)
    B
A := [0; 1 + 2i; 2; 3 + 2i; 4; 5 + 2i; 6; 7 + 2i; 8]
Z := Biz(A, N)
ZM := B(A, K)
# [plot: Im(A), Im(Z), Im(ZM) vs Re(A), Re(Z), Re(ZM)]
Более_точная_кривая
AV(z1, z2) := (z1 + z2)/2
SB(M, N, l) :=
    t ← 0
    Z[0] ← ln ← M[0]
    while rows(M) - t ≥ l
        B[0] ← ln
        for i ∈ 1 .. l - 2
            B[i] ← M[t + i]
        t ← t + l - 2
        B[l - 1] ← ln ← AV(M[t], M[t + 1])
        Zn ← Biz(B, N)
        Z ← stack(Z, Zn)
    Bl[0] ← ln
    for i ∈ 1 .. rows(M) - t - 1
        Bl[i] ← M[t + i]
    Zn ← Biz(Bl, N)
    Z ← stack(Z, Zn)
    Z
Z2 := SB(A, N, 3)
# [plot: Im(A), Im(Z2) vs Re(A), Re(Z2)]
Amer := [70i; 2 + 65i; 4 + 60i; 6 + 50i; 6 + 47i; 5.5 + 45i; 7 + 35i; 7.5 + 39i; 8 + 33i; 10 + 7i]
AZZ := SB(Amer, N, 3)
# [plot: Im(Amer), Im(AZZ) vs Re(Amer), Re(AZZ)]
Молдова
MO := [
    6 + 2i;
    9 - 1i;
    10 - 5i;
    8 - 6i;
    2 - 6i;
    0 - 9i;
    -2 - 12i;
    -5 - 15i;
    -9 - 16i;
    -8 - 11i;
    -7 - 6i;
    -8;
    -9 + 6i;
    -10 + 11i;
    -1 + 10i;
    5 + 6i;
    6 + 2i
]
MOB := SB(MO, N, 3)
# [plot: Im(MO), Im(MOB) vs Re(MO), Re(MOB)]
