x_круг(t) := 3*cos(t)
y_круг(t) := 3*sin(t)
# [plot: y_круг(t) vs x_круг(t)]
x_треугольник(t) :=
    if (t ≥ 0) and (t ≤ 4)
        t
    if (t ≥ 4) and (t ≤ 6)
        12 - 2*t
y_треугольник(t) :=
    if (t ≥ 0) and (t ≤ 2)
        t*3^(1/2)
    if (t ≥ 2) and (t ≤ 4)
        -t*3^(1/2) + 4*3^(1/2)
    if (t ≥ 4) and (t ≤ 6)
        0
# [plot: y_треугольник(t) vs x_треугольник(t)]
x_квадрат(t) :=
    if (t ≥ 0) and (t ≤ 4)
        t
    if (t ≥ 4) and (t ≤ 8)
        4
    if (t ≥ 8) and (t ≤ 12)
        12 - t
    if (t ≥ 12) and (t ≤ 16)
        0
y_квадрат(t) :=
    if (t ≥ 0) and (t ≤ 4)
        0
    if (t ≥ 4) and (t ≤ 8)
        t - 4
    if (t ≥ 8) and (t ≤ 12)
        4
    if (t ≥ 12) and (t ≤ 16)
        16 - t
t := 0 .. 16
# [plot: y_квадрат(t) vs x_квадрат(t)]
