"Начальные данные:"
u(x) := sqrt(1 - (x - 1)^2)
v(x) := sqrt(1 - x^2)
K := 100
ε := 0.2
a := 0
b := 1
H := 20
"Точка пересечения:"
x_0 := root(u(x) - v(x), x, a, b)
f_1(x) :=
    r ← 0
    if (x ≥ a) and (x ≤ x_0)
        r ← u(x)
    if (x > x_0) and (x ≤ b)
        r ← v(x)
    r
# [plot: f_1(x) vs x]
f_2(x) := sign(x - x_0)*f_1(x)
RandPoint(f) :=
    δ ← ε
    for i ∈ 0 .. (K + 1)
        r[i] ← f(a + (b - a)/(K + 1)*i) + rnd(ε) - rnd(δ)
    r
# [plot: f_2(x) vs x]
y := RandPoint(f_1) = [
    -0.0384109; 0.18731; 0.327762; 0.323219; 0.267458; 0.484625; 0.234985; 0.452904; 0.4688; 0.465335
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]
f_3(x, y) :=
    N1 ← trunc(x/(1/K))
    N2 ← N1 + 1
    g ← y[N1] + (x - N1/K)*(y[N2] - y[N1])/(N2 - N1)*K
    g
f_3(x) := f_3(x, y)
# [plot: f_1(x), f_3(x) vs x]
"Шаг:"
h := (b - a)/H
f_4(x, f) :=
    val ← 0
    if (x > 0) and (x ≤ 1)
        val ← f(h*trunc(x/h) + h*1/2)
    val
f_4(x) := f_4(x, f_1)
# [plot: f_4(x) vs x]
ORIGIN := 1
Posl(k) :=
    for i ∈ 1 .. k
        g[i] ← i
    g
"Натур. числа:"
"Норма разности:"
Metrik(f, g) :=
    val ← sqrt(integral(|f(x) - g(x)|^2, x = a .. b))
    val
"Скалярное произведение:"
Scalar(f, g) := integral(f(x)*g(x), x = a .. b)
ИНТЕРПОЛЯЦИОННЫЙ_ПОЛИНОМ
ORIGIN := 0
interpol(f, N, x) :=
    h ← (b - a)/N
    for i ∈ 0 .. N
        F[i] ← f(a + h*i)
        for j ∈ 0 .. N
            A[i, j] ← (a + h*i)^j
    α ← lsolve(A, F)
    sum(α[i]*x^i, i = 0 .. N)
ORIGIN := 1
"Последовательсноть погрешностей:"
PolyGrafic(f, k) :=
    for i ∈ 1 .. k
        interpolf(x) ← interpol(f, i, x)
        g[i] ← Metrik(interpolf, f)
    g
# [plot: f_1(x), interpol(f_1, 10, x) vs x]
apr := PolyGrafic(f_1, 20) = [0.645497; 0.0739327; 0.0788989; 0.0673227; 0.0478378; 0.0186399; 0.0226107; 0.0496155; 0.0236103; 0.0460973; 0.00932027; 0.132773; 0.0269634; 0.279936; 0.0272465; 0.737184; 0.0855796; 1.95126; 0.184971; 5.68803]
# [plot: apr vs Posl(20)]
# [plot: f_2(x), interpol(f_2, 10, x) vs x]
apr := PolyGrafic(f_2, 20) = [0.645497; 0.645497; 0.353544; 0.333363; 0.417337; 0.291377; 0.545268; 0.248881; 1.12456; 0.290164; 2.64636; 0.428599; 7.05911; 0.942484; 19.9458; 2.29969; 59.1369; 6.12738; 188.889; 16.9778]
# [plot: apr vs Posl(20)]
# [plot: f_3(x), interpol(f_3, 10, x) vs x]
apr := PolyGrafic(f_3, 20) = [0.572394; 0.112641; 0.0948975; 0.102983; 0.103548; 0.0971829; 0.142878; 0.0822167; 0.169811; 0.340923; 0.543742; 0.354829; 0.769039; 1.67154; 1.85006; 3.98019; 5.13003; 18.1585; 30.7337; 49.5153]
# [plot: apr vs Posl(20)]
# [plot: f_4(x), interpol(f_4, 11, x) vs x]
apr := PolyGrafic(f_4, 20) = [0.645633; 0.0822786; 0.0862401; 0.0735866; 0.063844; 0.0398964; 0.0486893; 0.0545231; 0.0405203; 0.0498591; 0.0407071; 0.0607605; 0.170994; 0.609495; 0.253562; 0.531634; 0.557191; 1.88151; 0.184776; 0.408978]
# [plot: apr vs Posl(20)]
ПРИБЛИЖЕНИЕ_МОНОМАМИ
ORIGIN := 0
φ(x, k) := x^k
powerpol(f, n, x) :=
    for i ∈ 0 .. n
        φi(x) ← φ(x, i)
        F[i] ← Scalar(f, φi)
        for j ∈ 0 .. n
            φj(x) ← φ(x, j)
            A[i, j] ← Scalar(φi, φj)
    α ← lsolve(A, F)
    sum(α[i]*x^i, i = 0 .. n)
ORIGIN := 1
"Последовательсноть погрешностей:"
PowerGrafic(f, k) :=
    for i ∈ 1 .. k
        powerpolf(x) ← powerpol(f, i, x)
        g[i] ← Metrik(powerpolf, f)
    g
# [plot: f_1(x), powerpol(f_1, 7, x) vs x]
apr := PowerGrafic(f_1, 20) = [0.198603; 0.0206442; 0.0206442; 0.01877; 0.01877; 0.00682848; 0.00682848; 0.00682303; 0.00682303; 0.00360354; 0.00360426; 0.0035942; 0.00359215; 0.00360223; 0.00352626; 0.00357072; 0.00321848; 0.00313878; 0.00401245; 0.00303907]
# [plot: apr vs Posl(20)]
# [plot: f_2(x), powerpol(f_2, 11, x) vs x]
apr := PowerGrafic(f_2, 20) = [0.47581; 0.47581; 0.321221; 0.321221; 0.274021; 0.274021; 0.236267; 0.236267; 0.214017; 0.214017; 0.195308; 0.19543; 0.194843; 0.198627; 0.186481; 0.189489; 0.186453; 0.187569; 0.237077; 0.17598]
# [plot: apr vs Posl(20)]
# [plot: f_3(x), powerpol(f_3, 3, x) vs x]
apr := PowerGrafic(f_3, 20) = [0.203377; 0.0639245; 0.0636363; 0.064101; 0.0647478; 0.0676625; 0.067237; 1.55609; 14.5807; 106.679; 716.407; 1664.34; 2204.15; 1549.69; 1198.14; 633.549; 1039.14; 2284.52; 25167.2; 15483.8]
# [plot: apr vs Posl(20)]
# [plot: f_4(x), powerpol(f_4, 4, x) vs x]
apr := PowerGrafic(f_4, 20) = [0.193486; 0.0250938; 0.0249775; 0.0255708; 0.0350282; 0.154678; 0.388995; 1.84743; 40.622; 520.926; 4514.44; 11130.8; 15284.5; 10760.6; 2323.21; 10299; 16391.4; 4295.92; 9890.8; 7210.66]
# [plot: apr vs Posl(20)]
ОРТОГОНАЛЬНЫЕ_МНОГОЧЛЕНЫ
ORIGIN := 1
TOL := 10^-3
C(k, n) :=
    if k == n
        1
    else
        up ← product(i, i = k + 1 .. n)
        down ← product(i, i = 1 .. n - k)
        up/down
γ(x, n) :=
    xx ← 2*x - 1
    1/2^n*sum(C(k, n)^2*(xx - 1)^(n - k)*(xx + 1)^k, k = 0 .. n)
"Полиномы Лежандра:"
"Проверка ортогональности:"
integral(γ(x, 5)*γ(x, 7), x = a .. b) = -5.55112e-17
"Ряд Фурье:"
ortopol(f, n, x) :=
    for i ∈ 1 .. n
        φi(x) ← γ(x, i)
        α[i] ← Scalar(f, φi)/Scalar(φi, φi)
    sum(α[i]*γ(x, i), i = 1 .. n)
"Последовательность погрешностей:"
OrtoGrafic(f, k) :=
    for i ∈ 1 .. k
        Ortopolf(x) ← ortopol(f, i, x)
        g[i] ← Metrik(Ortopolf, f)
    g
TOL := 10^-2
# [plot: f_1(x), ortopol(f_1, 7, x) vs x]
apr := OrtoGrafic(f_1, 20) = [0.645497; 0.614533; 0.614533; 0.614473; 0.614473; 0.614224; 0.614224; 0.614224; 0.614224; 0.614196; 0.614196; 0.614196; 0.614196; 0.614191; 0.614191; 0.614191; 0.614191; 0.61419; 0.61419; 0.61419]
# [plot: apr vs Posl(20)]
# [plot: f_2(x), ortopol(f_2, 11, x) vs x]
apr := OrtoGrafic(f_2, 20) = [0.47581; 0.47581; 0.321221; 0.321221; 0.274021; 0.274021; 0.236267; 0.236267; 0.214017; 0.214017; 0.195213; 0.195213; 0.181768; 0.181768; 0.170015; 0.170015; 0.160803; 0.160803; 0.152568; 0.152568]
# [plot: apr vs Posl(20)]
TOL := 10^-1  # disabled
# [plot: f_3(x), ortopol(f_3, 3, x) vs x]
apr := OrtoGrafic(f_3, 20)  # disabled
# [plot: apr vs Posl(20)]
# [plot: f_4(x), ortopol(f_4, 4, x) vs x]
apr := OrtoGrafic(f_4, 20)  # error: Эта переменная не определена. Проверьте правильность установки обозначения.; disabled
# [plot: apr vs Posl(20)]
ТРИГОНОМЕТРИЧЕСКИЕ_МНОГОЧЛЕНЫ
ORIGIN := 1
TOL := 10^-3
"Элементы триг. системы:"
t(x, k) :=
    l ← (b - a)/2
    if k == 1
        1/sqrt(2*l)
    else
        if trunc(k/2) == 0
            cos((k/2)*x*π/l)/sqrt(l)
        else
            sin((k - 1)/2*x*π/l)/sqrt(l)
"Проверка на ортонормированность:"
integral(t(x, 3)*t(x, 12), x = a .. b) = -5.05712e-16
integral(t(x, 4)^2, x = a .. b) = 1
trigpol(f, n, a, b, x) :=
    for i ∈ 1 .. n
        φi(x) ← t(x, i)
        α[i] ← Scalar(f, φi)
    sum(α[i]*t(x, i), i = 1 .. n)
"Последовательность погрешностей:"
TrigGrafic(f, k) :=
    for i ∈ 1 .. k
        polf(x) ← trigpol(f, i, x)
        g[i] ← Metrik(polf, f)
    g
# [plot: f_1(x), trigpol(f_1, 7, x) vs x]
apr := TrigGrafic(f_1, 20)
# [plot: apr vs Posl(20)]
# [plot: f_2(x), trigpol(f_2, 11, x) vs x]
apr := TrigGrafic(f_2, 20)
# [plot: apr vs Posl(20)]
# [plot: f_3(x), trigpol(f_3, 3, x) vs x]
apr := TrigGrafic(f_3, 20)
# [plot: apr vs Posl(20)]
# [plot: f_4(x), trigpol(f_4, 4, x) vs x]
apr := TrigGrafic(f_4, 20)
# [plot: apr vs Posl(20)]
СИСТЕМА_XААРА
ORIGIN := 1
"Фукнция Хаара k класса m:"
χ(x, k, m) :=
    val ← 0
    if (k/2^m ≤ x) and ((k + 1/2)/2^m > x)
        val ← sqrt(2^m)
    else
        if ((k + 1/2)/2^m ≤ x) and ((k + 1)/2^m > x)
            val ← -sqrt(2^m)
    val
χ(x, n) :=
    val ← 1
    if n ≥ 2
        m ← trunc(log(n - 1, 2))
        k ← n - 1 - 2^m
        val ← χ(x, k, m)
    val
"Проверка ортогональности:"
integral(χ(x, 5)*χ(x, 7), x = a .. b) = 0
"Ряд Фурье:"
xpol(f, n, a, b, x) :=
    for i ∈ 1 .. n
        φi(x) ← χ(x, i)
        α[i] ← Scalar(f, φi)/Scalar(φi, φi)
    sum(α[i]*χ(x, i), i = 1 .. n)
"Последовательность погрешностей:"
XGrafic(f, k) :=
    for i ∈ 1 .. k
        Ortopolf(x) ← xpol(f, i, x)
        g[i] ← Metrik(Ortopolf, f)
    g
# [plot: f_1(x), xpol(f_1, 7, x) vs x]
apr := XGrafic(f_1, 20)
# [plot: apr vs Posl(20)]
# [plot: f_2(x), xpol(f_2, 11, x) vs x]
apr := XGrafic(f_2, 20)
# [plot: apr vs Posl(20)]
# [plot: f_3(x), xpol(f_3, 3, x) vs x]
apr := XGrafic(f_3, 10)
# [plot: apr vs Posl(20)]
# [plot: f_4(x), xpol(f_4, 4, x) vs x]
apr := XGrafic(f_4, 20)
# [plot: apr vs Posl(20)]
