"Внутренняя задача Дирихле для уравнения Лапласа"
u(x) := sqrt(|1 - (x - 1)^2|)
v(x) := sqrt(|1 - x^2|)
"Разность функций:"
f(x) := u(x) - v(x)
"Начальная точка:"
x0 := 0.45
a := 0
b := 1
"Граничная функция:"
fi1(x, y) := 1/2
fi2(x, y) := 0/2
fi3(x, y) := -1/2
"Точка пересечения функций:"
per := root(f(x0), x0) = 0.5
eps := 10^-5
"Функция листа:"
f(x) :=
    r ← 0
    if a ≤ x ≤ per
        r ← u(x)
    if per < x ≤ b
        r ← v(x)
    r
# [plot: f(x) vs x]
"Параметризация границы области"
ξ := atan(u(per)/per) = 1.0472
π/3 = 1.0472
ORIGIN := 1
x1(t) := t
t11 := a
x2(t) := cos(t)
t21 := 0
x3(t) := 1 + cos(t)
t31 := 2*π/3
y1(t) := 0
t12 := b
y2(t) := sin(t)
t22 := ξ
y3(t) := sin(t)
t32 := π
"Параметрические значения точек на границе"
M := 15
i := 1 .. M
t1(i) := t11 + (i - 1)*(t12 - t11)/M
t2(i) := t21 + (i - 1)*(t22 - t21)/M
t3(i) := t31 + (i - 1)*(t32 - t31)/M
"Сопоставление параметрам конкретных точек на кривой"
S1x[i] := x1(t1(i))
S1y[i] := y1(t1(i))
S2x[i] := x2(t2(i))
S2y[i] := y2(t2(i))
S3x[i] := x3(t3(i))
S3y[i] := y3(t3(i))
"Базисные точки внутри области"
dx := 0.5
dy := 0.45
λ := 1.1
N := 3*M
Bx[i] := dx + λ*(S1x[i] - dx)
By[i] := dy + λ*(S1y[i] - dy)
Bx[i + M] := dx + λ*(S2x[i] - dx)
By[i + M] := dy + λ*(S2y[i] - dy)
Bx[i + 2*M] := dx + λ*(S3x[i] - dx)
By[i + 2*M] := dy + λ*(S3y[i] - dy)
m := 1 .. N
# [plot: S1y[m], S2y[m], S3y[m], By vs S1x[m], S2x[m], S3x[m], Bx]
"Система базисных потенциалов"
α(x, y, m) := 1/(4*π)*ln(sqrt(((x - Bx[m])^2 + (y - By[m])^2)))
"Заполнение СЛАУ"
"Дифференциалы дуг"
dS1(t) := sqrt((d/dt(x1(t)))^2 + (d/dt(y1(t)))^2) → 1
dS1(t) := 1
dS2(t) := sqrt((d/dt(x2(t)))^2 + (d/dt(y2(t)))^2) → sqrt(cos(t)^2 + sin(t)^2)
dS2(t) := 1
dS3(t) := sqrt((d/dt(x3(t)))^2 + (d/dt(y3(t)))^2) → sqrt(cos(t)^2 + sin(t)^2)
dS3(t) := 1
i := 1 .. N
j := 1 .. N
TOL := 10^-3
G1[i, j] := integral(α(x1(t), y1(t), i)*α(x1(t), y1(t), j)*dS1(t), t = t11 .. t12)
G2[i, j] := integral(α(x2(t), y2(t), i)*α(x2(t), y2(t), j)*dS2(t), t = t21 .. t22)
G3[i, j] := integral(α(x3(t), y3(t), i)*α(x3(t), y3(t), j)*dS3(t), t = t31 .. t32)
G[i, j] := G1[i, j] + G2[i, j] + G3[i, j]
b1[i] := integral(α(x1(t), y1(t), i)*fi1(x1(t), y1(t))*dS1(t), t = t11 .. t12)
b2[i] := integral(α(x2(t), y2(t), i)*fi2(x2(t), y2(t))*dS2(t), t = t21 .. t22)
b3[i] := integral(α(x3(t), y3(t), i)*fi3(x3(t), y3(t))*dS3(t), t = t31 .. t32)
b[i] := b1[i] + b2[i] + b3[i]
"Решение системы и нахождение точности аппроксимации"
c := lsolve(G, b)
φ(x, y) := sum(c[k]*α(x, y, k), k = 1 .. N)
l(x, y) :=
    u1 ← u(x)
    v1 ← v(x)
    if (x > 0) and (x ≤ per) and ((y > 0) and (y ≤ u1)) or (x > per) and (x ≤ 1) and ((y > 0) and (y ≤ v1))
        φ(x, y)
    else
        0
# [contour plot: l]
