a := 0
b := 1
u(x) := x
v(x) := -x + 1
x_0 := root(u(x) - v(x), x, a, b)
f_1(x) :=
    r ← 0
    if (x ≥ a) and (x ≤ x_0)
        r ← u(x)
    if (x > x_0) and (x ≤ b)
        r ← v(x)
    r
# [plot: f_1(x) vs x]
f_2(x) := sign(x - x_0)*f_1(x)
K := 100
ε := 0.1
RandPoint(f) :=
    δ ← ε
    for i ∈ 0 .. (K + 1)
        r[i] ← f(a + (b - a)/(K + 1)*i) + rnd(ε) - rnd(δ)
    r
# [plot: f_2(x) vs x]
y := RandPoint(f_1) = [
    0.0234698; 0.0747719; 0.0604529; 0.0241128; 0.126547; -0.0027692; 0.102957; 0.10868; 0.105552; 0.0811157
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]
f_3(x, y) :=
    N1 ← trunc(x/(1/K))
    N2 ← N1 + 1
    g ← y[N1] + (x - N1/K)*(y[N2] - y[N1])/(N2 - N1)*K
    g
# [plot: f_1(x), f_3(x, y) vs x]
f_3(x) := f_3(x, y)
f_4(x, h, f) :=
    val ← 0
    if (x > 0) and (x ≤ 1)
        val ← f(h*trunc(x/h) + h*1/2)
    val
f_4(x) := f_4(x, 0.05, f_1)
# [plot: f_4(x) vs x]
Posl(k) :=
    for i ∈ 1 .. k
        g[i] ← i
    g
Metrik(f, g) :=
    val ← sqrt(integral(|f(x) - g(x)|^2, x = a .. b))
    val
Scalar(f, g) := integral(f(x)*g(x), x = a .. b)
ПОЛИНОМ_ПРИБЛИЖЕНИЯ
ORIGIN := 0
φ(x, k) := x^k
powerpol(f, n, a, b, x) :=
    for i ∈ 0 .. n
        φi(x) ← φ(x, i)
        F[i] ← Scalar(f, φi)
        for j ∈ 0 .. n
            φj(x) ← φ(x, j)
            A[i, j] ← Scalar(φi, φj)
    α ← lsolve(A, F)
    sum(α[i]*x^i, i = 0 .. n)
PowerGrafic(f, k) :=
    for i ∈ 1 .. k
        powerpolf(x) ← powerpol(f, i, 0, 1, x)
        g[i] ← Metrik(powerpolf, f)
    g
# [plot: f_1(x), powerpol(f_1, 7, 0, 1, x) vs x]
# [plot: PowerGrafic(f_1, 20) vs Posl(20)]
PowerGrafic(f_1, 20) = [0; 0.144338; 0.0360844; 0.0360844; 0.0180422; 0.0180422; 0.0112764; 0.0112764; 0.181495; 2.90878; 24.5577; 141.696; 1757.38; 1395.69; 214.477; 131.611; 359.231; 371.568; 83.2405; 108.42; 220.228]
# [plot: PowerGrafic(f_2, 15) vs Posl(15)]
# [plot: f_2(x), powerpol(f_2, 11, 0, 1, x) vs x]
PowerGrafic(f_2, 15) = [0; 0.25; 0.25; 0.1875; 0.1875; 0.15625; 0.15625; 0.136719; 0.136719; 0.123047; 0.123047; 0.1128; 90.2589; 266.509; 81.1543; 40.0757]
# [plot: PowerGrafic(f_3, 10) vs Posl(10)]
# [plot: f_3(x), powerpol(f_3, 3, 0, 1, x) vs x]
PowerGrafic(f_3, 10) = [0; 0.14693; 0.0483156; 0.0480283; 0.0347553; 0.0372771; 0.0489019; 0.0925632; 0.543508; 5.19763; 44.6452]
# [plot: f_4(x), powerpol(f_4, 4, 0, 1, x) vs x]
# [plot: PowerGrafic(f_4, 20) vs Posl(20)]
PowerGrafic(f_4, 20) = [0; 0.143648; 0.0386669; 0.0386745; 0.0217956; 0.864707; 10.1418; 65.6973; 306.453; 1149.49; 3674.37; 10112.5; 66970.8; 42264.1; 13719; 9726.26; 105344; 25828.1; 16781.3; 17736.5; 15263]
