ORIGIN := 1
f(x, y) := (12*y + x^2 - 1)^2 + (49*x^2 + 49*y^2 + 84*x*y + (2324*y - 681)^2)^2
f(x, y) := (12*y + x^2 - 1)^2 + (49*x^2 + 49*y^2 + 84*x*y + (2324*y - 681)^2)^2
f(x, y) := (x - 2)^2 + 4*(y - 3)^2 + 1
grad(f, x, y) := [d/dx(f(x, y)); d/dy(f(x, y))]
G(f, x, y) := [d^2/dx^2(f(x, y)), d/dx(d/dy(f(x, y))); d/dx(d/dy(f(x, y))), d^2/dy^2(f(x, y))]
Sr(f, x, y, k) :=
    x0 ← x
    y0 ← y
    t ← 0
    while t < 1
        for i ∈ 1 .. k
            a1 ← rnd(k/(t + 1))
            a2 ← rnd(k/(t + 1))
            s1 ← x - a1
            s2 ← y - a2
            if f(x0, y0) > f(s1, s2)
                x0 ← s1
                y0 ← s2
        if f(x, y) > f(x0, y0)
            x ← x0
            y ← y0
            t ← t + 1
    [x; y]
Grad(f, x, y, g) :=
    α ← 1500
    i ← 0
    while |grad(f, x, y)| > g
        a ← x - α*grad(f, x, y)[1]
        b ← y - α*grad(f, x, y)[2]
        if f(a, b) < f(x, y)
            x ← a
            y ← b
            i ← i + 1
        else
            α ← α/2
        if i > 5
            i ← 0
            α ← 2*α
    [x; y]
Nev(f, x, y, ε) :=
    x0 ← [x; y]
    while |grad(f, x0[1], x0[2])| > ε
        x0 ← x0 - geninv(G(f, x0[1], x0[2]))*grad(f, x0[1], x0[2])
    x0
Comb(f, x, y) :=
    k ← 50
    g ← 0.0001
    ε ← 0.000001
    x0 ← Sr(f, x, y, k)
    x1 ← Grad(f, x0[1], x0[2], g)
    x2 ← Nev(f, x1[1], x1[2], ε)
    [x, y; x0[1], x0[2]; x1[1], x1[2]; x2[1], x2[2]]
Grad(f, 10, 10, 0.1) =  # no stored result
f(-0.23799, 0.292999) = -4.8194
Grad_step(f, x, y) :=
    α ← 150
    i ← 0
    while i < 1
        a ← x - α*grad(f, x, y)[1]
        b ← y - α*grad(f, x, y)[2]
        if f(a, b) < f(x, y)
            x ← a
            y ← b
            i ← i + 1
        else
            α ← α/2
    [x; y]
Ovr(f, x, y) :=
    ε ← 0.000001
    α ← 1000
    i ← 0
    u ← [x; y]
    t1 ← Grad_step(f, u[1], u[2])
    t2 ← Grad_step(f, t1[1], t1[2])
    if f(t2[1], t2[2]) > f(t1[1], t1[2])
        t ← t2
        t2 ← t1
        t1 ← t
    while |grad(f, u[1], u[2])| > ε
        u ← t2 - α*(t2 - t1)/|(t2 - t1)|*sign(f(t2[1], t2[2]) - f(t1[1], t1[2]))
        t ← Grad_step(f, u[1], u[2])
        if f(t[1], t[2]) < f(t2[1], t2[2])
            t1 ← t2
            t2 ← t
            i ← i + 1
        else
            α ← α/2
        if i > 10
            i ← 0
            α ← 2*α
    u
# [contour plot: f]
# [3D plot: f(x, y)]
genvals(□, □)
eigenvals(G(f, 2, 4)) = [2; 0]
