параметризациялемнискат
ORIGIN := 1
TOL := 10^-3
CTOL := 10^-3
zp := [-1; 1]
n := 2
f(z) := product(|z - zp[i]|, i = 1 .. n) - 1.1 → |z - 1|*|z + 1| - 1.1
x := sqrt(2.1)
x = 1.44914
f(x) = 2.22045e-16
Razb(z_0, ε, N) :=
    for i ∈ 1 .. N
        Rz[i] ← ε*(cos(2*π*i/N) + 1i*sin(2*π*i/N)) + z_0
    Rz
A := Razb(-1, 3, 100)
# [plot: Im(A) vs Re(A)]
InRad(z_0, ε, z) := |z - z_0| ≤ ε
CountWay(z, ε, N) :=
    Rz ← Razb(z, ε, N)
    k ← 0
    for i ∈ 2 .. N - 1
        if (|f(Rz[i])| < |f(Rz[i - 1])|) and (|f(Rz[i])| < |f(Rz[i + 1])|)
            k ← k + 1
            way[k] ← Rz[i]
    if (|f(Rz[1])| < |f(Rz[2])|) and (|f(Rz[1])| < |f(Rz[N])|)
        k ← k + 1
        way[k] ← Rz[1]
    if (|f(Rz[N])| < |f(Rz[1])|) and (|f(Rz[N])| < |f(Rz[N - 1])|)
        k ← k + 1
        way[k] ← Rz[N]
    [z; way; k]
m := CountWay(x, 0.001, 100)
m = [1.44914; [1.44914 + 0.001i; 1.44914 - 0.001i]; 2]
SelectWay(M) :=
    k ← 1
    if M[3] > 1
        for i ∈ 2 .. M[3]
            if |f(M[2][i])| < f(M[2][k])
                k ← i
    k
Isk(M, k) :=
    if k ≠ 1
        for i ∈ 1 .. k - 1
            way_r[i] ← M[2][i]
    if k ≠ M[3]
        for i ∈ k + 1 .. M[3]
            way_r[i - 1] ← M[2][i]
    [M[1]; way_r; M[3] - 1]
m[2] = [1.44914 + 0.001i; 1.44914 - 0.001i]
Pastway(M, zp, ξ) :=
    k ← 0
    if M[3] > 0
        t ← 1
        while (k == 0) and (t ≤ M[3])
            if |zp - M[2][t]| < ξ
                k ← t
            t ← t + 1
    k
m[2] = [1.44914 + 0.001i; 1.44914 - 0.001i]
m1 := CountWay(m[2][2], 0.001, 100)
|m1[2][1] - x| = 0
m1[2] = [1.44914; 1.44914 - 0.002i]
SelectWay(m) = 1
Pastway(m1, x, 0.001) = 1
m := Isk(m, 1) = [1.44914; [1.44914 - 0.001i]; 1]
IskPastway(M, zp, ξ) :=
    c ← Pastway(M, zp, ξ)
    while (c ≠ 0)
        M ← Isk(M, c)
        c ← Pastway(M, zp, ξ)
    M
m1 := IskPastway(m1, x, 0.001) = [1.44914 - 0.001i; [1.44914 - 0.002i]; 1]
m1[2] = [1.44914 - 0.002i]
MainProg(z0, ξ, N) :=
    T[1] ← z0
    M ← CountWay(z0, ξ, N)
    k ← SelectWay(M)
    T[2] ← M[2][2]
    t ← 2
    flag ← 1
    while flag
        M ← CountWay(T[t], ξ, N)
        M ← IskPastway(M, T[t - 1], ξ)
        k ← SelectWay(M)
        t ← t + 1
        T[t] ← M[2][k]
        flag ← |T[t] - T[1]| > ξ
    T
T := MainProg(x, 0.001, 1000)
T = [
    0.85242 - 0.549812i; 0.85142 - 0.549831i; 0.85042 - 0.54985i; 0.84942 - 0.549869i; 0.848421 - 0.549888i; 0.847421 - 0.549906i; 0.846421 - 0.549919i; 0.845421 - 0.549932i; 0.844421 - 0.549944i; 0.843421 - 0.549957i; 0.842421 - 0.549969i; 0.841421 - 0.549976i
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]
|T[3] - T[1]| = 0.00199999
# [plot: Im(T) vs Re(T)]
t := 913
0.841 - 0.55i == T[t] = 0
T[t] = 0.841421 - 0.549976i
0.855 - 0.55i
0.854 - 0.55i
T[rows(T) - 1] == T[rows(T)] = 0
M := CountWay(T[t], 0.001, 1000) = [0.841421 - 0.549976i; [0.840421 - 0.549982i; 0.842421 - 0.549969i]; 2]
M[2] = [0.840421 - 0.549982i; 0.842421 - 0.549969i]
c := Pastway(M, T[t - 1], 0.001) = 2
M := Isk(M, c) = [0.841421 - 0.549976i; [0.840421 - 0.549982i]; 1]
M := IskPastway(M, T[t - 1], 0.001) = [0.841421 - 0.549976i; [0.840421 - 0.549982i]; 1]
M[2] = [0.840421 - 0.549982i]
k := SelectWay(M)
k = 1
Tnext := M[2][k] = 0.840421 - 0.549982i
