ПАРАМЕТРИЗАЦИЯ_ЛЕМНИСКАТ
ORIGIN := 1
zp := [-1; 1]
n := 2
f(z) := product(|z - zp[i]|, i = 1 .. n) - 1.1 → |z - 1|*|z + 1| - 1.1
x := sqrt(2.1)
x = 1.44914
f(x) = 2.22045e-16
Razb(z_0, ε, N) :=
    for i ∈ 1 .. N
        Rz[i] ← ε*(cos(2*π*i/N) + 1i*sin(2*π*i/N)) + z_0
    Rz
A := Razb(3 + 3*1i, 3, 1000)
# [plot: Im(A) vs Re(A)]
A = [
    5.99994 + 3.01885i; 5.99976 + 3.0377i; 5.99947 + 3.05655i; 5.99905 + 3.07539i; 5.99852 + 3.09423i; 5.99787 + 3.11307i; 5.9971 + 3.1319i; 5.99621 + 3.15073i; 5.9952 + 3.16956i; 5.99408 + 3.18837i
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]
InRad(z_0, ε, z) := |z - z_0| ≤ ε
[z_i; way]
CountWay(z, ε, N) :=
    Rz ← Razb(z, ε, N)
    k ← 0
    for i ∈ 2 .. N - 1
        if (|f(Rz[i])| < |f(Rz[i - 1])|) and (|f(Rz[i])| < |f(Rz[i + 1])|)
            k ← k + 1
            way[k] ← Rz[i]
    if (|f(Rz[1])| < |f(Rz[2])|) and (|f(Rz[1])| < |f(Rz[N])|)
        k ← k + 1
        way[k] ← Rz[1]
    if (|f(Rz[N])| < |f(Rz[1])|) and (|f(Rz[N])| < |f(Rz[N - 1])|)
        k ← k + 1
        way[k] ← Rz[N]
    [z; way; k]
m := CountWay(x, 0.001, 100) = [1.44914; [1.44914 + 0.001i; 1.44914 - 0.001i]; 2]
SelectWay(M) :=
    k ← 1
    if M[3] > 1
        for i ∈ 2 .. M[3]
            if |f(M[2][i])| < |f(M[2][k])|
                k ← i
    k
f(m[2][1]) = 2.81818e-6
m[2] = [1.44914 + 0.001i; 1.44914 - 0.001i]
SelectWay(m) = 1
Isk(M, k) :=
    if k ≠ 1
        for i ∈ 1 .. k - 1
            way_r[i] ← M[2][i]
    if k ≠ M
        for i ∈ k + 1 .. M[3]
            way_r[i - 1] ← M[2][i]
    [M[1]; way_r; M[3] - 1]
PastWay(M, zp, ξ) :=
    k ← 0
    if M[3] > 0
        t ← 1
        while (k == 0) and (t ≤ M[3])
            if |zp - M[2][t]| < ξ
                k ← t
            t ← t + 1
    k
m1 := CountWay(m[2][2], 0.001, 100)
m1[3] = 2
|m1[2][1] - x| = 0
m1[2] = [1.44914; 1.44914 - 0.002i]
PastWay(m1, x, 0.001) = 1
IskPastWay(M, zp, ξ) :=
    c ← PastWay(M, zp, ξ)
    while (c ≠ 0)
        M ← Isk(M, c)
        c ← PastWay(M, zp, ξ)
    M
m2 := IskPastWay(m1, x, 0.001) = [1.44914 - 0.001i; [1.44914 - 0.002i]; 1]
m2[1] = 1.44914 - 0.001i
MainPlog(z0, ξ, N) :=
    T[1] ← z0
    M ← CountWay(z0, ξ, N)
    k ← SelectWay(M)
    T[2] ← M[2][2]
    t ← 2
    flag ← 1
    while flag and (t < 86)
        M ← CountWay(T[t], ξ, N)
        M ← IskPastWay(M, T[t - 1], ξ)
        k ← SelectWay(M)
        t ← t + 1
        T[t] ← M[2][k]
        flag ← |T[t] - T[1]| > ξ
    T[t + 1] ← T[t]
    T
T := MainPlog(x, 0.01, 100)
T = [
    1.44914; 1.44914 - 0.01i; 1.44851 - 0.0199803i; 1.44851 - 0.0299803i; 1.44788 - 0.0399605i; 1.44663 - 0.0498817i; 1.44538 - 0.0598028i; 1.44412 - 0.069724i; 1.44287 - 0.0796451i; 1.44099 - 0.089468i
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]
|T[3] - T[1]| = 0.0199901
# [plot: Im(T) vs Re(T)]
