div(n, m) := (n - mod(n, m))/m
α := [0; π/3; -π/3; 0]
Frk(z0, α, l, k, m) :=
    z[0] ← z0
    for i ∈ 0 .. m^k - 1
        for j ∈ 0 .. k - 1
            t[j] ← mod(div(i, m^j), m)
        φ ← sum(α[t[j]], j = 0 .. k - 1)
        z[i + 1] ← z[i] + l^k*e^(1i*φ)
    z
z := Frk(0, α, 1/3, 4, 4)
# [plot: Im(z) vs Re(z)]
β := [0; π/2; 0; -π/2; 0]
z1 := Frk(0, β, 1/3, 4, 5)
# [plot: Im(z1) vs Re(z1)]
γ := [0; 2*π/3; 0; -2*π/3; 0]
z2 := Frk(0, γ, 1/3, 6, 5)
# [plot: Im(z2) vs Re(z2)]
W(z) := (z - 1i)/(z + 1i)
w2 := W(z2)
# [plot: Im(w2) vs Re(w2)]
W(z) := (z - 1i)/(z + 1i)
w1 := W(z)
# [plot: Im(w1) vs Re(w1)]
W(z) := (z - 1i)/(z + 1i)
w3 := W(z1)
# [plot: Im(w3) vs Re(w3)]
