f(x) := (x - 2)^2 + 1
n := 1000000
a := 0
b := 6
# [plot: f(x) vs x]
MinPerebor(a, b) :=
    h ← (b - a)/n
    m ← a
    fm ← f(a)
    for i ∈ 1 .. n
        x ← a + h*i
        if f(x) < fm
            fm ← f(x)
            m ← x
        else
            [fm; m]
    [fm; m]
MinPerebor(0, 6) = [1; 2]
f(x) := sin(x)^2
f(x) := x*sec(x)
sec(7) = 1.32643
MinDich(a, b) :=
    e ← 10^-6
    while |a - b| > e
        x ← (b + a)/2
        if d/dx(f(x)) > 0
            b ← x
        else
            a ← x
    [x; f(x)]
1/cos(7) = 1.32643
MinDich(2, 10) = [6.12125; 6.2024]
f(x) := (x - 4)^2
e := 0.00001
z(x) := (x + 67)^4
s(x) := coth(x)
q := 0.5
Gold(a, b, f) :=
    i ← 0
    while |a - b| > e
        x1 ← a + (3 - sqrt(5))*(b - a)/2
        x2 ← a + (sqrt(5) - 1)/2*(b - a)
        if f(x2) > f(x1)
            b ← x2
        else
            a ← x1
        i ← i + 1
    [i; x1; f(x1)]
Gold(0, 6, f) = [28; 4; 7.92049e-12]
Gold(-80, -50, z) = [31; -67; 0]
Gold(-20, 20, s) = [32; -5.67444e-6; -176229]
Grad(a, b, f) :=
    i ← 1
    x1 ← a
    x2 ← x1 - q*d/dx1(f(x1))
    while |x2 - x1| > e
        x1 ← x2 - q*d/dx2(f(x2))
        t ← x1
        x1 ← x2
        x2 ← t
        i ← i + 1
    [i; x1; f(x1)]
Grad(0, 6, f) = [2; 4; 0]
Grad(-80, -50, z) = [4; 0; 8.18681e135]
Grad(-20, 20, s) = [1; -20; -1]
Neu(a, b, f) :=
    x ← a
    i ← 0
    g(x) ← d/dx(f(x))
    while |g(x)| > e
        x ← x - g(x)/d/dx(g(x))
        i ← i + 1
    [i; x; f(x)]
Neu(0, 6, f) = [1; 4; 0]
Neu(-80, -50, z) = [17; -67.0132; 3.03087e-8]
