ORIGIN := 1
a := 0
b := 1
u(x) := x
v(x) := -x + 1
x_0 := root(u(x) - v(x), x, a, b)
f_1(x) :=
    r ← 0
    if (x ≥ a) and (x ≤ x_0)
        r ← u(x)
    if (x > x_0) and (x ≤ b)
        r ← v(x)
    r
# [plot: f_1(x) vs x]
f_2(x) := sign(x - x_0)*f_1(x)
K := 100
ε := 0.1
RandPoint(f) :=
    δ ← ε
    for i ∈ 0 .. (K + 1)
        r[i] ← f(a + (b - a)/(K + 1)*i) + rnd(ε) - rnd(δ)
    r
# [plot: f_2(x) vs x]
y := RandPoint(f_1) = [
    -0.0464874; 0.0615346; 0.0116075; 0.0150104; -0.00922322; 0.0592986; 0.0282223; 0.145417; 0.0942486; 0.105936
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]
f_3(x, y) :=
    N1 ← trunc(x/(1/K))
    N2 ← N1 + 1
    g ← y[N1] + (x - N1/K)*(y[N2] - y[N1])/(N2 - N1)*K
    g
# [plot: f_1(x), f_3(x, y) vs x]
posl(t, n) := t^(n + 1)/(n + 1) - t^(2*n + 1)/(2*n + 1)
dposl(t, n) := t^n - t^(2*n)
# [plot: dposl(t, 1), dposl(t, 2), dposl(t, 4), dposl(t, 8), dposl(t, 15) vs t]
interpol(f, N, a, b, x) :=
    h ← (b - a)/(N + 1)
    for i ∈ 1 .. N
        F[i] ← f(a + h*i)
        for j ∈ 1 .. N
            A[i, j] ← (a + h*i)^j
    α ← lsolve(A, F)
    k ← 0
    for i ∈ 1 .. N
        k ← k + α[i]*x^i
    k + f(0)
l(x) := x + cos(x)*x - sin(x)
r(x) := exp(x)/20 + 2*sin(x)
# [plot: l(x), interpol(l, 4, -4, 4, x), interpol(l, 6, -4, 4, x) vs x]
# [plot: r(x), interpol(r, 4, -4, 4, x), interpol(r, 6, -4, 4, x) vs x]
